# OpenSim document version 30000
Model AhelaosActivLevel12:
  length_units: meters
  force_units: N
  gravity: 0 -9.80665 0
  credits:
    Delp S.L., Loan J.P., Hoy M.G., Zajac F.E., Topp E.L., Rosen J.M., Thelen D.G., Anderson F.C., Seth A., Hamner S.R.
  publications:
    Notes: 3D, 23 DOF gait model created by D.G. Thelen, Univ. of Wisconsin-Madison, and Samuel Hamner, Ajay Seth, Frank C. Anderson, and Scott L. Delp, Stanford University. Lower extremity joint defintions based on Delp et al. (1990). Low back joint and anthropometry based on Anderson and Pandy (1999, 2001). Planar knee model of Yamaguchi and Zajac (1989). Seth removed the patella to avoid kinematic constraints; insertions of the quadrucepts are handled with moving points in the tibia frame. Hamner added arms adapted from Holzbaur et al., 2005. Hamner, S.R., Seth, A, Delp, S.L.: Muscle contributions to propulsion and support during running. Journal of Biomechanics, 2010. Delp, S.L., Loan, J.P., Hoy, M.G., Zajac, F.E., Topp E.L., Rosen, J.M.: An interactive graphics-based model of the lower extremity to study orthopaedic surgical procedures, IEEE Transactions on Biomedical Engineering, vol. 37, pp. 757-767, 1990. Yamaguchi G.T., Zajac F.E.: A planar model of the knee joint to characterize the knee extensor mechanism." J . Biomech. vol. 21. pp. 1-10. 1989. Anderson F.C., Pandy M.G.: A dynamic optimization solution for vertical jumping in three dimensions. Computer Methods in Biomechanics and Biomedical Engineering 2:201-231, 1999. Anderson F.C., Pandy M.G.: Dynamic optimization of human walking. Journal of Biomechanical Engineering 123:381-390, 2001. Holzbaur, KR, WM Murray and SL Delp, 2005. A model of the upper extremity for simulating musculoskeletal surgery and analyzing neuromuscular control. Ann Biomed Eng 33(6): 829-840.
  BodySet:
    Body ground: mass=0 mass_center=(0 0 0) inertia_xx=0 inertia_yy=0 inertia_zz=0
    Body pelvis: mass=11.37517 mass_center=(-0.0713732 0 0) inertia_xx=0.08722033 inertia_yy=0.08722033
        inertia_zz=0.05699457 meshes=(sacrum.vtp pelvis.vtp l_pelvis.vtp)
      CustomJoint ground_pelvis: parent_body=ground location_in_parent=(0 0 0) location=(0 0 0)
        Coordinate pelvis_tilt: motion_type=rotational default_value=0 range=(-1.570796 1.570796) clamped=true
        Coordinate pelvis_list: motion_type=rotational default_value=0 range=(-1.570796 1.570796) clamped=true
        Coordinate pelvis_rotation: motion_type=rotational default_value=0 range=(-3.14 3.14) clamped=true
        Coordinate pelvis_tx: motion_type=translational default_value=0 range=(-5 5) clamped=true
        Coordinate pelvis_ty: motion_type=translational default_value=0 range=(-1 2) clamped=true
        Coordinate pelvis_tz: motion_type=translational default_value=0 range=(-3 3) clamped=true
        SpatialTransform:
          TransformAxis rotation1: coordinates=pelvis_tilt axis=(0 0 1) LinearFunction(coefficients=1 0)
          TransformAxis rotation2: coordinates=pelvis_list axis=(1 0 0) LinearFunction(coefficients=1 0)
          TransformAxis rotation3: coordinates=pelvis_rotation axis=(0 1 0) LinearFunction(coefficients=1 0)
          TransformAxis translation1: coordinates=pelvis_tx axis=(1 0 0) LinearFunction(coefficients=1 0)
          TransformAxis translation2: coordinates=pelvis_ty axis=(0 1 0) LinearFunction(coefficients=1 0)
          TransformAxis translation3: coordinates=pelvis_tz axis=(0 0 1) LinearFunction(coefficients=1 0)
    Body femur_r: mass=8.984038 mass_center=(0 -0.17 0) inertia_xx=0.1293314 inertia_yy=0.0339024 inertia_zz=0.1363823
        meshes=femur_r.vtp
      CustomJoint hip_r: parent_body=pelvis location_in_parent=(-0.07137321 -0.06672941 0.07576243) location=(0 0 0)
        Coordinate hip_flexion_r: motion_type=rotational default_value=0 range=(-2.094395 2.094395) clamped=true
        Coordinate hip_adduction_r: motion_type=rotational default_value=0 range=(-2.094395 2.094395) clamped=true
        Coordinate hip_rotation_r: motion_type=rotational default_value=0 range=(-2.094395 2.094395) clamped=true
        SpatialTransform: axes_held_at_zero=(translation1 translation2 translation3)
          TransformAxis rotation1: coordinates=hip_flexion_r axis=(0 0 1) LinearFunction(coefficients=1 0)
          TransformAxis rotation2: coordinates=hip_adduction_r axis=(1 0 0) LinearFunction(coefficients=1 0)
          TransformAxis rotation3: coordinates=hip_rotation_r axis=(0 1 0) LinearFunction(coefficients=1 0)
    Body tibia_r: mass=3.581001 mass_center=(0 -0.199108 0) inertia_xx=0.055366 inertia_yy=0.005602512
        inertia_zz=0.05613497 meshes=(tibia_r.vtp fibula_r.vtp)
      CustomJoint knee_r: parent_body=femur_r location_in_parent=(0 0 0) location=(0 0 0)
        Coordinate knee_angle_r: motion_type=rotational default_value=0 range=(-2.094395 0)
        Coordinate knee_adduction_r: motion_type=rotational default_value=0.0171811 range=(-0.171811 0) clamped=false
            locked=true
        Coordinate knee_rotation_r: motion_type=rotational default_value=0.07181098 range=(-0.1745329 0) clamped=false
            locked=true
        Coordinate knee_anterior_posterior_r: motion_type=translational default_value=0 range=(-0.016 0.016)
            clamped=true
        Coordinate knee_inferior_superior_r: motion_type=translational default_value=-0.4 range=(-0.416 -0.384)
            clamped=true locked=true
        Coordinate knee_medial_lateral_r: motion_type=translational default_value=0 range=(-0.012 0.012) clamped=true
            locked=true
        SpatialTransform:
          TransformAxis rotation1: coordinates=knee_angle_r axis=(0 0 1) LinearFunction(coefficients=1 0)
          TransformAxis rotation2: coordinates=knee_adduction_r axis=(0 1 0) LinearFunction(coefficients=1 0)
          TransformAxis rotation3: coordinates=knee_rotation_r axis=(1 0 0) LinearFunction(coefficients=1 0)
          TransformAxis translation1: coordinates=knee_anterior_posterior_r axis=(1 0 0)
              LinearFunction(coefficients=1 0)
          TransformAxis translation2: coordinates=knee_inferior_superior_r axis=(0 1 0)
              LinearFunction(coefficients=1 0)
          TransformAxis translation3: coordinates=knee_medial_lateral_r axis=(0 0 1) LinearFunction(coefficients=1 0)
    Body talus_r: mass=0.09658802 mass_center=(0 0 0) inertia_xx=0.001139833 inertia_yy=0.001139833
        inertia_zz=0.001139833 meshes=talus_rv.vtp
      CustomJoint ankle_r: parent_body=tibia_r location_in_parent=(0 -0.4585779 0) location=(0 0 0)
        Coordinate ankle_angle_r: motion_type=rotational default_value=0 range=(-1.570796 1.570796) clamped=true
        SpatialTransform: axes_held_at_zero=(rotation2 rotation3 translation1 translation2 translation3)
          TransformAxis rotation1: coordinates=ankle_angle_r axis=(-0.1050135 -0.1740224 0.9791263)
              LinearFunction(coefficients=1 0)
    Body calcn_r: mass=1.20735 mass_center=(0.108632 0.0325897 0) inertia_xx=0.001595766 inertia_yy=0.004445348
        inertia_zz=0.004673314 meshes=foot.vtp
      CustomJoint subtalar_r: parent_body=talus_r location_in_parent=(-0.05297997 -0.04557124 0.008603677)
          location=(0 0 0)
        Coordinate subtalar_angle_r: motion_type=rotational default_value=0 range=(-1.570796 1.570796) clamped=true
            locked=true
        SpatialTransform: axes_held_at_zero=(rotation2 rotation3 translation1 translation2 translation3)
          TransformAxis rotation1: coordinates=subtalar_angle_r axis=(0.7871796 0.6047475 -0.1209495)
              LinearFunction(coefficients=1 0)
    Body toes_r: mass=0.2092097 mass_center=(0.0375868 0.00651794 -0.0190107) inertia_xx=0.0001139833
        inertia_yy=0.0002279665 inertia_zz=0.001139833 meshes=bofoot.vtp
      CustomJoint mtp_r: parent_body=calcn_r location_in_parent=(0.1942345 -0.002172646 0.001173229) location=(0 0 0)
        Coordinate mtp_angle_r: motion_type=rotational default_value=0 range=(-1.570796 1.570796) clamped=true
            locked=true
        SpatialTransform: axes_held_at_zero=(rotation2 rotation3 translation1 translation2 translation3)
          TransformAxis rotation1: coordinates=mtp_angle_r axis=(-0.5809544 0 0.8139361)
              LinearFunction(coefficients=1 0)
    Body femur_l: mass=8.984038 mass_center=(0 -0.17 0) inertia_xx=0.1293314 inertia_yy=0.0339024 inertia_zz=0.1363823
        meshes=femur_l.vtp
      CustomJoint hip_l: parent_body=pelvis location_in_parent=(-0.07137321 -0.06672941 -0.07576243) location=(0 0 0)
        Coordinate hip_flexion_l: motion_type=rotational default_value=0 range=(-2.094395 2.094395) clamped=true
        Coordinate hip_adduction_l: motion_type=rotational default_value=0 range=(-2.094395 2.094395) clamped=true
        Coordinate hip_rotation_l: motion_type=rotational default_value=0 range=(-2.094395 2.094395) clamped=true
        SpatialTransform: axes_held_at_zero=(translation1 translation2 translation3)
          TransformAxis rotation1: coordinates=hip_flexion_l axis=(0 0 1) LinearFunction(coefficients=1 0)
          TransformAxis rotation2: coordinates=hip_adduction_l axis=(-1 0 0) LinearFunction(coefficients=1 0)
          TransformAxis rotation3: coordinates=hip_rotation_l axis=(0 -1 0) LinearFunction(coefficients=1 0)
    Body tibia_l: mass=3.581001 mass_center=(0 -0.199108 0) inertia_xx=0.055366 inertia_yy=0.005602512
        inertia_zz=0.05613497 meshes=(tibia_l.vtp fibula_l.vtp)
      CustomJoint knee_l: parent_body=femur_l location_in_parent=(0 0 0) location=(0 0 0)
        Coordinate knee_angle_l: motion_type=rotational default_value=-0.0290726 range=(-2.094395 0) clamped=true
        Coordinate knee_adduction_l: motion_type=rotational default_value=0.0171811 range=(-0.171811 0) clamped=false
            locked=true
        Coordinate knee_rotation_l: motion_type=rotational default_value=0.07181098 range=(-0.1745329 0) clamped=false
            locked=true
        Coordinate knee_anterior_posterior_l: motion_type=translational default_value=0 range=(-0.016 0.016)
            clamped=true locked=true
        Coordinate knee_inferior_superior_l: motion_type=translational default_value=-0.4 range=(-0.416 -0.384)
            clamped=true locked=true
        Coordinate knee_medial_lateral_l: motion_type=translational default_value=0 range=(-0.012 0.012) clamped=true
            locked=true
        SpatialTransform:
          TransformAxis rotation1: coordinates=knee_angle_l axis=(0 0 1) LinearFunction(coefficients=1 0)
          TransformAxis rotation2: coordinates=knee_adduction_l axis=(0 1 0) LinearFunction(coefficients=1 0)
          TransformAxis rotation3: coordinates=knee_rotation_l axis=(1 0 0) LinearFunction(coefficients=1 0)
          TransformAxis translation1: coordinates=knee_anterior_posterior_l axis=(1 0 0)
              LinearFunction(coefficients=1 0)
          TransformAxis translation2: coordinates=knee_inferior_superior_l axis=(0 1 0)
              LinearFunction(coefficients=1 0)
          TransformAxis translation3: coordinates=knee_medial_lateral_l axis=(0 0 1) LinearFunction(coefficients=1 0)
    Body talus_l: mass=0.09658802 mass_center=(0 0 0) inertia_xx=0.001139833 inertia_yy=0.001139833
        inertia_zz=0.001139833 meshes=talus_lv.vtp
      CustomJoint ankle_l: parent_body=tibia_l location_in_parent=(0 -0.4585779 0) location=(0 0 0)
        Coordinate ankle_angle_l: motion_type=rotational default_value=0 range=(-1.047198 1.047198) clamped=true
        SpatialTransform: axes_held_at_zero=(rotation2 rotation3 translation1 translation2 translation3)
          TransformAxis rotation1: coordinates=ankle_angle_l axis=(0.1050135 0.1740224 0.9791263)
              LinearFunction(coefficients=1 0)
    Body calcn_l: mass=1.20735 mass_center=(0.108632 0.0325897 0) inertia_xx=0.001595766 inertia_yy=0.004445348
        inertia_zz=0.004673314 meshes=l_foot.vtp
      CustomJoint subtalar_l: parent_body=talus_l location_in_parent=(-0.05297997 -0.04557124 -0.008603677)
          location=(0 0 0)
        Coordinate subtalar_angle_l: motion_type=rotational default_value=0 range=(-1.570796 1.570796) clamped=true
            locked=true
        SpatialTransform: axes_held_at_zero=(rotation2 rotation3 translation1 translation2 translation3)
          TransformAxis rotation1: coordinates=subtalar_angle_l axis=(-0.7871796 -0.6047475 -0.1209495)
              LinearFunction(coefficients=1 0)
    Body toes_l: mass=0.2092097 mass_center=(0.0375868 0.00651794 0.0190107) inertia_xx=0.0001139833
        inertia_yy=0.0002279665 inertia_zz=0.001139833 meshes=l_bofoot.vtp
      CustomJoint mtp_l: parent_body=calcn_l location_in_parent=(0.1942345 -0.002172646 -0.001173229) location=(0 0 0)
        Coordinate mtp_angle_l: motion_type=rotational default_value=0 range=(-1.047198 1.047198) clamped=true
            locked=true
        SpatialTransform: axes_held_at_zero=(rotation2 rotation3 translation1 translation2 translation3)
          TransformAxis rotation1: coordinates=mtp_angle_l axis=(0.5809544 0 0.8139361)
              LinearFunction(coefficients=1 0)
    Body torso: mass=25.91128 mass_center=(-0.0345 0.368 0) inertia_xx=1.883492 inertia_yy=0.965058 inertia_zz=1.828437
        meshes=(hat_spine.vtp hat_jaw.vtp hat_skull.vtp hat_ribs_scap.vtp)
      CustomJoint back: parent_body=pelvis location_in_parent=(-0.1016589 0.08227605 0) location=(0 0 0)
        Coordinate lumbar_extension: motion_type=rotational default_value=0 range=(-1.570796 1.570796) clamped=true
        Coordinate lumbar_bending: motion_type=rotational default_value=0 range=(-1.570796 1.570796) clamped=true
        Coordinate lumbar_rotation: motion_type=rotational default_value=0 range=(-1.570796 1.570796) clamped=true
        SpatialTransform: axes_held_at_zero=(translation1 translation2 translation3)
          TransformAxis rotation1: coordinates=lumbar_extension axis=(0 0 1) LinearFunction(coefficients=1 0)
          TransformAxis rotation2: coordinates=lumbar_bending axis=(1 0 0) LinearFunction(coefficients=1 0)
          TransformAxis rotation3: coordinates=lumbar_rotation axis=(0 1 0) LinearFunction(coefficients=1 0)
    Body humerus_r: mass=1.963152 mass_center=(0 -0.186289 0) inertia_xx=0.01479712 inertia_yy=0.005104547
        inertia_zz=0.01660929 meshes=humerus_rv.vtp
      CustomJoint acromial_r: parent_body=torso location_in_parent=(0.00362825 0.427225 0.1955) location=(0 0 0)
        Coordinate arm_flex_r: motion_type=rotational default_value=0 range=(-1.570796 1.570796) clamped=true
        Coordinate arm_add_r: motion_type=rotational default_value=0 range=(-2.094395 1.570796) clamped=true
        Coordinate arm_rot_r: motion_type=rotational default_value=0 range=(-1.570796 1.570796) clamped=true
        SpatialTransform: axes_held_at_zero=(translation1 translation2 translation3)
          TransformAxis rotation1: coordinates=arm_flex_r axis=(0 0 1) LinearFunction(coefficients=1 0)
          TransformAxis rotation2: coordinates=arm_add_r axis=(1 0 0) LinearFunction(coefficients=1 0)
          TransformAxis rotation3: coordinates=arm_rot_r axis=(0 1 0) LinearFunction(coefficients=1 0)
    Body ulna_r: mass=0.5867722 mass_center=(0 -0.156284 0) inertia_xx=0.004810432 inertia_yy=0.001003662
        inertia_zz=0.005218068 meshes=ulna_rv.vtp
      CustomJoint elbow_r: parent_body=humerus_r location_in_parent=(0.01488481 -0.3241873 -0.01086577)
          location=(0 0 0)
        Coordinate elbow_flex_r: motion_type=rotational default_value=0 range=(0 2.618) clamped=true
        SpatialTransform: axes_held_at_zero=(rotation2 rotation3 translation1 translation2 translation3)
          TransformAxis rotation1: coordinates=elbow_flex_r axis=(0.226047 0.022269 0.9738618)
              LinearFunction(coefficients=1 0)
    Body radius_r: mass=0.5867722 mass_center=(0 -0.156284 0) inertia_xx=0.004810432 inertia_yy=0.001003662
        inertia_zz=0.005218068 meshes=radius_rv.vtp
      CustomJoint radioulnar_r: parent_body=ulna_r location_in_parent=(-0.008722868 -0.01686611 0.0338217)
          location=(0 0 0)
        Coordinate pro_sup_r: motion_type=rotational default_value=0 range=(0 1.570796) clamped=true
        SpatialTransform: axes_held_at_zero=(rotation2 rotation3 translation1 translation2 translation3)
          TransformAxis rotation1: coordinates=pro_sup_r axis=(0.05639803 0.9984065 0.001952)
              LinearFunction(coefficients=1 0)
    Body hand_r: mass=0.4418902 mass_center=(0 -0.0578804 0) inertia_xx=0.0006224736 inertia_yy=0.0003817187
        inertia_zz=0.0009351061
        meshes=(pisiform_rvs.vtp lunate_rvs.vtp scaphoid_rvs.vtp triquetrum_rvs.vtp hamate_rvs.vtp capitate_rvs.vtp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)
      CustomJoint radius_hand_r: parent_body=radius_r location_in_parent=(-0.01140703 -0.3058139 0.01764802)
          location=(0 0 0)
        Coordinate wrist_flex_r: motion_type=rotational default_value=0 range=(-1.22173 1.22173) clamped=true
            locked=true
        Coordinate wrist_dev_r: motion_type=rotational default_value=0 range=(-0.4363323 0.6108652) clamped=true
            locked=true
        SpatialTransform: axes_held_at_zero=(rotation3 translation1 translation2 translation3)
          TransformAxis rotation1: coordinates=wrist_flex_r axis=(0 0 1) LinearFunction(coefficients=1 0)
          TransformAxis rotation2: coordinates=wrist_dev_r axis=(1 0 0) LinearFunction(coefficients=1 0)
    Body humerus_l: mass=1.963152 mass_center=(0 -0.186289 0) inertia_xx=0.01479712 inertia_yy=0.005104547
        inertia_zz=0.01660929 meshes=humerus_lv.vtp
      CustomJoint acromial_l: parent_body=torso location_in_parent=(0.00362825 0.427225 -0.1955) location=(0 0 0)
        Coordinate arm_flex_l: motion_type=rotational default_value=0 range=(-1.570796 1.570796) clamped=true
        Coordinate arm_add_l: motion_type=rotational default_value=0 range=(-2.094395 1.570796) clamped=true
        Coordinate arm_rot_l: motion_type=rotational default_value=0 range=(-1.570796 1.570796) clamped=true
        SpatialTransform: axes_held_at_zero=(translation1 translation2 translation3)
          TransformAxis rotation1: coordinates=arm_flex_l axis=(0 0 1) LinearFunction(coefficients=1 0)
          TransformAxis rotation2: coordinates=arm_add_l axis=(-1 0 0) LinearFunction(coefficients=1 0)
          TransformAxis rotation3: coordinates=arm_rot_l axis=(0 -1 0) LinearFunction(coefficients=1 0)
    Body ulna_l: mass=0.5867722 mass_center=(0 -0.156284 0) inertia_xx=0.004810432 inertia_yy=0.001003662
        inertia_zz=0.005218068 meshes=ulna_lv.vtp
      CustomJoint elbow_l: parent_body=humerus_l location_in_parent=(0.01488481 -0.3241873 0.01086577) location=(0 0 0)
        Coordinate elbow_flex_l: motion_type=rotational default_value=0 range=(0 2.618) clamped=true
        SpatialTransform: axes_held_at_zero=(rotation2 rotation3 translation1 translation2 translation3)
          TransformAxis rotation1: coordinates=elbow_flex_l axis=(-0.226047 -0.022269 0.9738618)
              LinearFunction(coefficients=1 0)
    Body radius_l: mass=0.5867722 mass_center=(0 -0.156284 0) inertia_xx=0.004810432 inertia_yy=0.001003662
        inertia_zz=0.005218068 meshes=radius_lv.vtp
      CustomJoint radioulnar_l: parent_body=ulna_l location_in_parent=(-0.008722868 -0.01686611 -0.0338217)
          location=(0 0 0)
        Coordinate pro_sup_l: motion_type=rotational default_value=0 range=(0 1.570796) clamped=true
        SpatialTransform: axes_held_at_zero=(rotation2 rotation3 translation1 translation2 translation3)
          TransformAxis rotation1: coordinates=pro_sup_l axis=(-0.05639803 -0.9984065 0.001952)
              LinearFunction(coefficients=1 0)
    Body hand_l: mass=0.4418902 mass_center=(0 -0.0578804 0) inertia_xx=0.0006224736 inertia_yy=0.0003817187
        inertia_zz=0.0009351061
        meshes=(pisiform_lvs.vtp lunate_lvs.vtp scaphoid_lvs.vtp triquetrum_lvs.vtp hamate_lvs.vtp capitate_lvs.vtp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)
      CustomJoint radius_hand_l: parent_body=radius_l location_in_parent=(-0.01140703 -0.3058139 -0.01764802)
          location=(0 0 0)
        Coordinate wrist_flex_l: motion_type=rotational default_value=0 range=(-1.22173 1.22173) clamped=true
            locked=true
        Coordinate wrist_dev_l: motion_type=rotational default_value=0 range=(-0.4363323 0.6108652) clamped=true
            locked=true
        SpatialTransform: axes_held_at_zero=(rotation3 translation1 translation2 translation3)
          TransformAxis rotation1: coordinates=wrist_flex_l axis=(0 0 1) LinearFunction(coefficients=1 0)
          TransformAxis rotation2: coordinates=wrist_dev_l axis=(-1 0 0) LinearFunction(coefficients=1 0)
  ForceSet:
    Thelen2003Muscle [values shared by the 92 below unless stated]: activation_time_constant=0.01
        deactivation_time_constant=0.04 FmaxTendonStrain=0.033 FmaxMuscleStrain=0.6 KshapeActive=0.5 KshapePassive=4
        Af=0.3 Flen=1.8
    Thelen2003Muscle glut_med1_r: max_isometric_force=1638 optimal_fiber_length=0.0541628
        tendon_slack_length=0.07896632 pennation_angle_at_optimal=0.1396263 [radians]
      PathPoint P1: pelvis (-0.0411885 0.0306895 0.109697)
      PathPoint P2: femur_r (-0.0218 -0.0117 0.0555)
    Thelen2003Muscle glut_med2_r: max_isometric_force=1146 optimal_fiber_length=0.08490966
        tendon_slack_length=0.05325695 pennation_angle_at_optimal=0
      PathPoint P1: pelvis (-0.0863141 0.0449237 0.0695018)
      PathPoint P2: femur_r (-0.0258 -0.0058 0.0527)
    Thelen2003Muscle glut_med3_r: max_isometric_force=1306 optimal_fiber_length=0.0643261
        tendon_slack_length=0.05277528 pennation_angle_at_optimal=0.3316126
      PathPoint P1: pelvis (-0.123465 0.0106 0.0587953)
      PathPoint P2: femur_r (-0.0309 -0.0047 0.0518)
    Thelen2003Muscle glut_min1_r: max_isometric_force=540 optimal_fiber_length=0.06915491
        tendon_slack_length=0.01627174 pennation_angle_at_optimal=0.1745329
      PathPoint P1: pelvis (-0.0471447 -0.00807618 0.0958145)
      PathPoint P2: femur_r (-0.0072 -0.0104 0.056)
    Thelen2003Muscle glut_min2_r: max_isometric_force=570 optimal_fiber_length=0.05681936
        tendon_slack_length=0.02638042 pennation_angle_at_optimal=0
      PathPoint P1: pelvis (-0.0639027 -0.00656189 0.0899168)
      PathPoint P2: femur_r (-0.0096 -0.0104 0.056)
    Thelen2003Muscle glut_min3_r: max_isometric_force=646 optimal_fiber_length=0.03825039
        tendon_slack_length=0.05133605 pennation_angle_at_optimal=0.01745329
      PathPoint P1: pelvis (-0.0841941 -0.00635999 0.0776678)
      PathPoint P2: femur_r (-0.0135 -0.0083 0.055)
    Thelen2003Muscle semimem_r: max_isometric_force=2576 optimal_fiber_length=0.08056112 tendon_slack_length=0.361518
        pennation_angle_at_optimal=0.2617994
      PathPoint P1: pelvis (-0.120335 -0.0983981 0.0648835)
      ConditionalPathPoint P2: tibia_r (-0.0371128 -0.0375287 -0.0201668) range=(-0.558505 0.174533)
          coordinate=knee_angle_r
      PathPoint P3: tibia_r (-0.0287944 -0.0508808 -0.0208706)
    Thelen2003Muscle semiten_r: max_isometric_force=820 optimal_fiber_length=0.2039371 tendon_slack_length=0.2592335
        pennation_angle_at_optimal=0.08726646
      PathPoint P1: pelvis (-0.127553 -0.110926 0.0547939)
      ConditionalPathPoint P2: tibia_r (-0.0448233 -0.0304901 -0.0242833) range=(-0.331613 0.174533)
          coordinate=knee_angle_r
      PathPoint P3: tibia_r (-0.0354278 -0.0563304 -0.0244006)
      PathPoint P4: tibia_r (-0.012051 -0.0795579 -0.0261283)
      PathPoint P5: tibia_r (0.00287944 -0.101954 -0.0205827)
    Thelen2003Muscle bifemlh_r: max_isometric_force=1792 optimal_fiber_length=0.1099163 tendon_slack_length=0.3287406
        pennation_angle_at_optimal=0
      PathPoint P1: pelvis (-0.127159 -0.103547 0.0630053)
      PathPoint P2: tibia_r (-0.0321005 -0.0383926 0.0313859)
      PathPoint P3: tibia_r (-0.0249552 -0.0600417 0.0365796)
    Thelen2003Muscle bifemsh_r: max_isometric_force=1608 optimal_fiber_length=0.1759539 tendon_slack_length=0.09051966
        pennation_angle_at_optimal=0.4014257
      PathPoint P1: femur_r (0.005 -0.2111 0.0234)
      PathPoint P2: tibia_r (-0.0321005 -0.0383926 0.0313859)
      PathPoint P3: tibia_r (-0.0249552 -0.0600417 0.0365796)
    Thelen2003Muscle sar_r: max_isometric_force=312 optimal_fiber_length=0.5257008 tendon_slack_length=0.1010963
        pennation_angle_at_optimal=0
      PathPoint P1: pelvis (-0.0154457 -0.00131238 0.112691)
      PathPoint P2: femur_r (-0.003 -0.3568 -0.0421)
      PathPoint P3: tibia_r (-0.00597218 -0.0446847 -0.0425518)
      PathPoint P4: tibia_r (0.00639876 -0.0628145 -0.0408454)
      PathPoint P5: tibia_r (0.025915 -0.0895827 -0.0268748)
    Thelen2003Muscle add_long_r: max_isometric_force=1254 optimal_fiber_length=0.136349 tendon_slack_length=0.108684
        pennation_angle_at_optimal=0.1047198
      PathPoint P1: pelvis (-0.0319009 -0.084396 0.015334)
      PathPoint P2: femur_r (0.005 -0.2111 0.0234)
    Thelen2003Muscle add_brev_r: max_isometric_force=858 optimal_fiber_length=0.1285513 tendon_slack_length=0.01933103
        pennation_angle_at_optimal=0
      PathPoint P1: pelvis (-0.0592589 -0.0923713 0.0148803)
      PathPoint P2: femur_r (0.0009 -0.1196 0.0294)
    Thelen2003Muscle add_mag1_r: max_isometric_force=762 optimal_fiber_length=0.08357918 tendon_slack_length=0.05764081
        pennation_angle_at_optimal=0.08726646
      PathPoint P1: pelvis (-0.073897 -0.118518 0.023137)
      PathPoint P2: femur_r (-0.0045 -0.1211 0.0339)
    Thelen2003Muscle add_mag2_r: max_isometric_force=686 optimal_fiber_length=0.1195341 tendon_slack_length=0.1185462
        pennation_angle_at_optimal=0.05235988
      PathPoint P1: pelvis (-0.0838913 -0.120335 0.0279459)
      PathPoint P2: femur_r (0.0054 -0.2285 0.0227)
    Thelen2003Muscle add_mag3_r: max_isometric_force=976 optimal_fiber_length=0.1308222 tendon_slack_length=0.2486621
        pennation_angle_at_optimal=0.08726646
      PathPoint P1: pelvis (-0.112138 -0.115217 0.0442961)
      PathPoint P2: femur_r (0.007 -0.3837 -0.0266)
    Thelen2003Muscle tfl_r: max_isometric_force=466 optimal_fiber_length=0.09574836 tendon_slack_length=0.4283479
        pennation_angle_at_optimal=0.05235988
      PathPoint P1: pelvis (-0.0313961 0.0216038 0.1126)
      PathPoint P2: femur_r (0.0294 -0.0995 0.0597)
      PathPoint P3: femur_r (0.0054 -0.4049 0.0357)
      PathPoint P4: tibia_r (0.00639876 -0.0519366 0.0316739)
    Thelen2003Muscle pect_r: max_isometric_force=532 optimal_fiber_length=0.09796021 tendon_slack_length=0.03232687
        pennation_angle_at_optimal=0
      PathPoint P1: pelvis (-0.0435104 -0.0775313 0.0409208)
      PathPoint P2: femur_r (-0.0122 -0.0822 0.0253)
    Thelen2003Muscle grac_r: max_isometric_force=324 optimal_fiber_length=0.3564199 tendon_slack_length=0.1275821
        pennation_angle_at_optimal=0.05235988
      PathPoint P1: pelvis (-0.0747147 -0.11983 0.0253509)
      ConditionalPathPoint P2: tibia_r (-0.0283358 -0.0340201 -0.0402482) range=(-0.436332 0.174533)
          coordinate=knee_angle_r
      PathPoint P3: tibia_r (-0.0207213 -0.0549547 -0.0381793)
      PathPoint P4: tibia_r (0.00639876 -0.0891561 -0.0243153)
    Thelen2003Muscle glut_max1_r: max_isometric_force=1146 optimal_fiber_length=0.1426435 tendon_slack_length=0.1255665
        pennation_angle_at_optimal=0.08726646
      PathPoint P1: pelvis (-0.120638 0.0617828 0.0635134)
      PathPoint P2: pelvis (-0.130329 0.00121143 0.0803898)
      PathPoint P3: femur_r (-0.0457 -0.0248 0.0392)
      PathPoint P4: femur_r (-0.0277 -0.0566 0.047)
    Thelen2003Muscle glut_max2_r: max_isometric_force=1638 optimal_fiber_length=0.1468165 tendon_slack_length=0.1268415
        pennation_angle_at_optimal=0
      PathPoint P1: pelvis (-0.136185 0.0177676 0.0510829)
      PathPoint P2: pelvis (-0.13891 -0.0524951 0.0829304)
      PathPoint P3: femur_r (-0.0426 -0.053 0.0293)
      PathPoint P4: femur_r (-0.0156 -0.1016 0.0419)
    Thelen2003Muscle glut_max3_r: max_isometric_force=1104 optimal_fiber_length=0.1423608 tendon_slack_length=0.1433495
        pennation_angle_at_optimal=0.08726646
      PathPoint P1: pelvis (-0.157082 -0.031699 0.00526254)
      PathPoint P2: pelvis (-0.154356 -0.106202 0.0365656)
      PathPoint P3: femur_r (-0.0299 -0.1041 0.0135)
      PathPoint P4: femur_r (-0.006 -0.1419 0.0411)
    Thelen2003Muscle iliacus_r: max_isometric_force=2146 optimal_fiber_length=0.1006508 tendon_slack_length=0.1006508
        pennation_angle_at_optimal=0.1221731
      PathPoint P1: pelvis (-0.0680418 0.0368476 0.0774864)
      PathPoint P2: pelvis (-0.0260457 -0.0555237 0.0735848)
      ConditionalPathPoint P3: pelvis (-0.0290742 -0.0812665 0.0740385) range=(-1.5708 0.785398)
          coordinate=hip_flexion_r
      PathPoint P4: femur_r (0.0017 -0.0543 0.0057)
      PathPoint P5: femur_r (-0.0193 -0.0621 0.0129)
    Thelen2003Muscle psoas_r: max_isometric_force=2226 optimal_fiber_length=0.1001704 tendon_slack_length=0.1602726
        pennation_angle_at_optimal=0.1396263
      PathPoint P1: pelvis (-0.0653161 0.0895446 0.026222)
      PathPoint P2: pelvis (-0.0240266 -0.0575428 0.0688667)
      ConditionalPathPoint P3: pelvis (-0.0290742 -0.0812665 0.0740385) range=(-1.5708 0.785398)
          coordinate=hip_flexion_r
      PathPoint P4: femur_r (0.0016 -0.0507 0.0038)
      PathPoint P5: femur_r (-0.0188 -0.0597 0.0104)
    Thelen2003Muscle quad_fem_r: max_isometric_force=762 optimal_fiber_length=0.05188388 tendon_slack_length=0.0230595
        pennation_angle_at_optimal=0
      PathPoint P1: pelvis (-0.115388 -0.116196 0.0471814)
      PathPoint P2: femur_r (-0.0381 -0.0359 0.0366)
    Thelen2003Muscle gem_r: max_isometric_force=328 optimal_fiber_length=0.02371416 tendon_slack_length=0.03853551
        pennation_angle_at_optimal=0
      PathPoint P1: pelvis (-0.114379 -0.0827808 0.0647837)
      PathPoint P2: femur_r (-0.0142 -0.0033 0.0443)
    Thelen2003Muscle peri_r: max_isometric_force=888 optimal_fiber_length=0.02531487 tendon_slack_length=0.1119696
        pennation_angle_at_optimal=0.1745329
      PathPoint P1: pelvis (-0.140929 0.000302857 0.0213224)
      PathPoint P2: pelvis (-0.120436 -0.0278628 0.0596119)
      PathPoint P3: femur_r (-0.0148 -0.0036 0.0437)
    Thelen2003Muscle rect_fem_r: max_isometric_force=2338 optimal_fiber_length=0.1137573 tendon_slack_length=0.3093401
        pennation_angle_at_optimal=0.08726646
      PathPoint P1: pelvis (-0.0297809 -0.0313961 0.08783)
      ConditionalPathPoint P2: femur_r (0.0334 -0.403 0.0019) range=(-2.61799 -1.45997) coordinate=knee_angle_r
      MovingPathPoint P3: tibia_r (0.0584917 0.0240258 0.00149304) x_coordinate=knee_angle_r y_coordinate=knee_angle_r
          z_coordinate=knee_angle_r
        x_location: MultiplierFunction: scale=1.06646
          SimmSpline: x=(-2.0944 -1.99997 -1.5708 -1.45752 -1.39626 -1.0472 -0.698132 -0.526391 -0.349066 -0.174533 0 0.00017453 0.00034907 0.0279253 0.0872665 0.174533 2.0944)
              y=(0.0155805 0.0179938 0.0275081 0.0296564 0.0307615 0.0365695 0.0422074 0.0450902 0.048391 0.0534299 0.0617576 0.0617669 0.0617762 0.0633083 0.066994 0.0733035 0.0573481)
        y_location: MultiplierFunction: scale=1.06646
          SimmSpline: x=(-2.0944 -1.99997 -1.5708 -1.45752 -1.39626 -1.0472 -0.698132 -0.526391 -0.349066 -0.174533 0 0.00017453 0.00034907 0.0279253 0.0872665 0.174533 2.0944)
              y=(0.0234116 0.0237613 0.0251141 0.0252795 0.0253146 0.0249184 0.0242373 0.0238447 0.0234197 0.0227644 0.020984 0.0209814 0.0209788 0.0205225 0.0191754 0.0159554 -0.0673774)
        z_location: MultiplierFunction: scale=1.06646
          SimmSpline: x=(-2.0944 0.1745) y=(0.0014 0.0014)
    Thelen2003Muscle vas_med_r: max_isometric_force=2588 optimal_fiber_length=0.08872967 tendon_slack_length=0.1256173
        pennation_angle_at_optimal=0.08726646
      PathPoint P1: femur_r (0.014 -0.2099 0.0188)
      PathPoint P2: femur_r (0.0356 -0.2769 0.0009)
      ConditionalPathPoint P3: femur_r (0.037 -0.4048 -0.0125) range=(-2.61799 -1.21004) coordinate=knee_angle_r
      ConditionalPathPoint P4: femur_r (0.0274 -0.4255 -0.0131) range=(-2.61799 -1.78006) coordinate=knee_angle_r
      MovingPathPoint P5: tibia_r (0.0522452 0.0240422 -0.0155703) x_coordinate=knee_angle_r y_coordinate=knee_angle_r
          z_coordinate=knee_angle_r
        x_location: MultiplierFunction: scale=1.06646
          SimmSpline: x=(-2.0944 -1.99997 -1.5708 -1.45752 -1.39626 -1.0472 -0.698132 -0.526391 -0.349066 -0.174533 0 0.00017453 0.00034907 0.0279253 0.0872665 0.174533 2.0944)
              y=(0.00981097 0.0122243 0.0217371 0.0238851 0.0249902 0.0307959 0.0364187 0.0392871 0.0425654 0.0475764 0.0559586 0.0559681 0.0559776 0.0575419 0.0613368 0.0679503 0.0629332)
        y_location: MultiplierFunction: scale=1.06646
          SimmSpline: x=(-2.0944 -1.99997 -1.5708 -1.45752 -1.39626 -1.0472 -0.698132 -0.526391 -0.349066 -0.174533 0 0.00017453 0.00034907 0.0279253 0.0872665 0.174533 2.0944)
              y=(0.0224154 0.0227651 0.0241265 0.0242933 0.0243287 0.0239462 0.0233593 0.0230677 0.0228342 0.0226362 0.0217917 0.0217903 0.0217889 0.0215365 0.0206842 0.0183269 -0.0656205)
        z_location: MultiplierFunction: scale=1.06646
          SimmSpline: x=(-2.0944 2.0944) y=(-0.0146 -0.0146)
    Thelen2003Muscle vas_int_r: max_isometric_force=2730 optimal_fiber_length=0.0864695 tendon_slack_length=0.1351707
        pennation_angle_at_optimal=0.05235988
      PathPoint P1: femur_r (0.029 -0.1924 0.031)
      PathPoint P2: femur_r (0.0335 -0.2084 0.0285)
      ConditionalPathPoint P3: femur_r (0.0343 -0.403 0.0055) range=(-2.61799 -1.42) coordinate=knee_angle_r
      MovingPathPoint P4: tibia_r (0.0512094 0.0276611 0.00191963) x_coordinate=knee_angle_r y_coordinate=knee_angle_r
          z_coordinate=knee_angle_r
        x_location: MultiplierFunction: scale=1.06646
          SimmSpline: x=(-2.0944 -1.99997 -1.5708 -1.45752 -1.39626 -1.0472 -0.698132 -0.526391 -0.349066 -0.174533 0 0.00017453 0.00034907 0.0279253 0.0872665 0.174533 2.0944)
              y=(0.0082733 0.0106866 0.0202042 0.022353 0.0234583 0.0292715 0.0349465 0.037871 0.0412569 0.0465287 0.0554632 0.0554735 0.0554837 0.0571717 0.061272 0.0684368 0.0648818)
        y_location: MultiplierFunction: scale=1.06646
          SimmSpline: x=(-2.0944 -1.99997 -1.5708 -1.45752 -1.39626 -1.0472 -0.698132 -0.526391 -0.349066 -0.174533 0 0.00017453 0.00034907 0.0279253 0.0872665 0.174533 2.0944)
              y=(0.025599 0.0259487 0.0273124 0.0274796 0.0275151 0.0271363 0.0265737 0.0263073 0.0261187 0.0260129 0.0252923 0.0252911 0.0252898 0.0250526 0.0242191 0.0218288 -0.0685706)
        z_location: MultiplierFunction: scale=1.06646
          SimmSpline: x=(-2.0944 2.0944) y=(0.0018 0.0018)
    Thelen2003Muscle vas_lat_r: max_isometric_force=3742 optimal_fiber_length=0.08389463 tendon_slack_length=0.1568031
        pennation_angle_at_optimal=0.08726646
      PathPoint P1: femur_r (0.0048 -0.1854 0.0349)
      PathPoint P2: femur_r (0.0269 -0.2591 0.0409)
      ConditionalPathPoint P3: femur_r (0.0361 -0.403 0.0205) range=(-2.61799 -1.21004) coordinate=knee_angle_r
      ConditionalPathPoint P4: femur_r (0.0253 -0.4243 0.0184) range=(-2.61799 -1.92004) coordinate=knee_angle_r
      MovingPathPoint P5: tibia_r (0.056792 0.022287 0.0175966) x_coordinate=knee_angle_r y_coordinate=knee_angle_r
          z_coordinate=knee_angle_r
        x_location: MultiplierFunction: scale=1.06646
          SimmSpline: x=(-2.0944 -1.99997 -1.5708 -1.45752 -1.39626 -1.0472 -0.698132 -0.526391 -0.349066 -0.174533 0 0.00017453 0.00034907 0.0279253 0.0872665 0.174533 2.0944)
              y=(0.0142897 0.016703 0.0262145 0.0283623 0.0294674 0.0352709 0.0408785 0.0437291 0.0469704 0.0518742 0.0599557 0.0599647 0.0599738 0.0614577 0.0650351 0.0711867 0.0583766)
        y_location: MultiplierFunction: scale=1.06646
          SimmSpline: x=(-2.0944 -1.99997 -1.5708 -1.45752 -1.39626 -1.0472 -0.698132 -0.526391 -0.349066 -0.174533 0 0.00017453 0.00034907 0.0279253 0.0872665 0.174533 2.0944)
              y=(0.0215318 0.0218815 0.0232362 0.0234019 0.0234371 0.0230439 0.0223842 0.0220151 0.0216359 0.0210971 0.0195864 0.0195842 0.019582 0.01919 0.018008 0.0151073 -0.0653421)
        z_location: MultiplierFunction: scale=1.06646
          SimmSpline: x=(-2.0944 2.0944) y=(0.0165 0.0165)
    Thelen2003Muscle med_gas_r: max_isometric_force=3116 optimal_fiber_length=0.06392778 tendon_slack_length=0.4155306
        pennation_angle_at_optimal=0.296706
      PathPoint P1: femur_r (-0.019 -0.3929 -0.0235)
      ConditionalPathPoint P2: femur_r (-0.03 -0.4022 -0.0258) range=(-0.785398 0.174533) coordinate=knee_angle_r
      PathPoint P3: calcn_r (0 0.033676 -0.00575751)
    Thelen2003Muscle lat_gas_r: max_isometric_force=1366 optimal_fiber_length=0.06818681 tendon_slack_length=0.4048592
        pennation_angle_at_optimal=0.1396263
      PathPoint P1: femur_r (-0.022 -0.3946 0.0272)
      ConditionalPathPoint P2: femur_r (-0.03 -0.4018 0.0274) range=(-0.785398 0.174533) coordinate=knee_angle_r
      PathPoint P3: calcn_r (0 0.033676 -0.00575751)
    Thelen2003Muscle soleus_r: max_isometric_force=7098 optimal_fiber_length=0.0533864 tendon_slack_length=0.266932
        pennation_angle_at_optimal=0.4363323
      PathPoint P1: tibia_r (-0.0025595 -0.163488 0.00757187)
      PathPoint P2: calcn_r (0 0.033676 -0.00575751)
    Thelen2003Muscle tib_post_r: max_isometric_force=3176 optimal_fiber_length=0.03314087 tendon_slack_length=0.3314087
        pennation_angle_at_optimal=0.2094395
      PathPoint P1: tibia_r (-0.0100247 -0.143759 0.00202627)
      PathPoint P2: tibia_r (-0.015357 -0.432023 -0.0244219)
      PathPoint P3: calcn_r (0.0452997 0.0362832 -0.0310688)
      PathPoint P4: calcn_r (0.0838641 0.0172725 -0.0305257)
    Thelen2003Muscle flex_dig_r: max_isometric_force=620 optimal_fiber_length=0.03657768 tendon_slack_length=0.4303256
        pennation_angle_at_optimal=0.1221731
      PathPoint P1: tibia_r (-0.00885162 -0.218198 -0.00191963)
      PathPoint P2: tibia_r (-0.0164235 -0.432023 -0.0209026)
      PathPoint P3: calcn_r (0.0473637 0.0342192 -0.030417)
      PathPoint P4: calcn_r (0.0769117 0.0191193 -0.0285703)
      PathPoint P5: calcn_r (0.180112 -0.00879922 0.0126013)
      PathPoint P6: toes_r (-0.00206401 -0.00847332 0.0159689)
      PathPoint P7: toes_r (0.0309602 -0.00771289 0.0233559)
      PathPoint P8: toes_r (0.0479068 -0.00651794 0.026289)
    Thelen2003Muscle flex_hal_r: max_isometric_force=644 optimal_fiber_length=0.0462941 tendon_slack_length=0.4091107
        pennation_angle_at_optimal=0.1745329
      PathPoint P1: tibia_r (-0.00842504 -0.248912 0.0260216)
      PathPoint P2: tibia_r (-0.0198362 -0.435009 -0.0185564)
      PathPoint P3: calcn_r (0.0406285 0.0299825 -0.0261804)
      PathPoint P4: calcn_r (0.11276 0.007387 -0.0278099)
      PathPoint P5: calcn_r (0.187499 -0.00575751 -0.0292221)
      PathPoint P6: toes_r (0.016838 -0.00695247 -0.0287876)
      PathPoint P7: toes_r (0.0610513 -0.0110805 -0.0196624)
    Thelen2003Muscle tib_ant_r: max_isometric_force=1810 optimal_fiber_length=0.1048791 tendon_slack_length=0.2386534
        pennation_angle_at_optimal=0.08726646
      PathPoint P1: tibia_r (0.0190896 -0.173193 0.0122643)
      PathPoint P2: tibia_r (0.0350865 -0.421358 -0.0188763)
      PathPoint P3: calcn_r (0.126665 0.0193365 -0.0331328)
    Thelen2003Muscle per_brev_r: max_isometric_force=870 optimal_fiber_length=0.05350374 tendon_slack_length=0.172282
        pennation_angle_at_optimal=0.08726646
      PathPoint P1: tibia_r (-0.00746522 -0.282185 0.03466)
      PathPoint P2: tibia_r (-0.0211159 -0.446207 0.0301808)
      PathPoint P3: tibia_r (-0.015357 -0.458045 0.0308207)
      PathPoint P4: calcn_r (0.0511658 0.0293307 0.0253113)
      PathPoint P5: calcn_r (0.0735441 0.0237905 0.0372609)
    Thelen2003Muscle per_long_r: max_isometric_force=1886 optimal_fiber_length=0.05253599 tendon_slack_length=0.3698963
        pennation_angle_at_optimal=0.1745329
      PathPoint P1: tibia_r (0.00053323 -0.167221 0.0386059)
      PathPoint P2: tibia_r (-0.0220757 -0.448447 0.0305008)
      PathPoint P3: tibia_r (-0.0172767 -0.460604 0.0308207)
      PathPoint P4: calcn_r (0.0475809 0.0249854 0.0240077)
      PathPoint P5: calcn_r (0.0739786 0.011515 0.0308516)
      PathPoint P6: calcn_r (0.0925547 0.00749563 0.0128186)
      PathPoint P7: calcn_r (0.130685 0.00923374 -0.0199883)
    Thelen2003Muscle per_tert_r: max_isometric_force=360 optimal_fiber_length=0.08463504 tendon_slack_length=0.107133
        pennation_angle_at_optimal=0.2268928
      PathPoint P1: tibia_r (0.00106646 -0.299035 0.0246352)
      PathPoint P2: tibia_r (0.0244219 -0.433943 0.0169567)
      PathPoint P3: calcn_r (0.0930979 0.0247682 0.0324811)
    Thelen2003Muscle ext_dig_r: max_isometric_force=1024 optimal_fiber_length=0.1095249 tendon_slack_length=0.3704519
        pennation_angle_at_optimal=0.1396263
      PathPoint P1: tibia_r (0.00341267 -0.147278 0.0294343)
      PathPoint P2: tibia_r (0.0308207 -0.427331 0.00767851)
      PathPoint P3: calcn_r (0.100159 0.0421493 -0.000108632)
      PathPoint P4: calcn_r (0.17555 0.00597478 0.0141222)
      PathPoint P5: toes_r (0.000325897 0.00510572 0.0166207)
      PathPoint P6: toes_r (0.0481241 -0.000434529 0.0271581)
    Thelen2003Muscle ext_hal_r: max_isometric_force=324 optimal_fiber_length=0.1192918 tendon_slack_length=0.3277837
        pennation_angle_at_optimal=0.1047198
      PathPoint P1: tibia_r (0.00127975 -0.188444 0.0243153)
      PathPoint P2: tibia_r (0.0347666 -0.424984 -0.00906491)
      PathPoint P3: calcn_r (0.105373 0.042258 -0.0229214)
      PathPoint P4: calcn_r (0.140462 0.0335674 -0.0279185)
      PathPoint P5: calcn_r (0.188368 0.0150999 -0.030417)
      PathPoint P6: toes_r (0.0323724 0.00445392 -0.0266149)
      PathPoint P7: toes_r (0.06116 0.0036935 -0.0202056)
    Thelen2003Muscle glut_med1_l: max_isometric_force=1638 optimal_fiber_length=0.0541628
        tendon_slack_length=0.07896632 pennation_angle_at_optimal=0.1396263
      PathPoint P1: pelvis (-0.0411885 0.0306895 -0.109697)
      PathPoint P2: femur_l (-0.0218 -0.0117 -0.0555)
    Thelen2003Muscle glut_med2_l: max_isometric_force=1146 optimal_fiber_length=0.08490966
        tendon_slack_length=0.05325695 pennation_angle_at_optimal=0
      PathPoint P1: pelvis (-0.0863141 0.0449237 -0.0695018)
      PathPoint P2: femur_l (-0.0258 -0.0058 -0.0527)
    Thelen2003Muscle glut_med3_l: max_isometric_force=1306 optimal_fiber_length=0.0643261
        tendon_slack_length=0.05277528 pennation_angle_at_optimal=0.3316126
      PathPoint P1: pelvis (-0.123465 0.0106 -0.0587953)
      PathPoint P2: femur_l (-0.0309 -0.0047 -0.0518)
    Thelen2003Muscle glut_min1_l: max_isometric_force=540 optimal_fiber_length=0.06915491
        tendon_slack_length=0.01627174 pennation_angle_at_optimal=0.1745329
      PathPoint P1: pelvis (-0.0471447 -0.00807618 -0.0958145)
      PathPoint P2: femur_l (-0.0072 -0.0104 -0.056)
    Thelen2003Muscle glut_min2_l: max_isometric_force=570 optimal_fiber_length=0.05681936
        tendon_slack_length=0.02638042 pennation_angle_at_optimal=0
      PathPoint P1: pelvis (-0.0639027 -0.00656189 -0.0899168)
      PathPoint P2: femur_l (-0.0096 -0.0104 -0.056)
    Thelen2003Muscle glut_min3_l: max_isometric_force=646 optimal_fiber_length=0.03825039
        tendon_slack_length=0.05133605 pennation_angle_at_optimal=0.01745329
      PathPoint P1: pelvis (-0.0841941 -0.00635999 -0.0776678)
      PathPoint P2: femur_l (-0.0135 -0.0083 -0.055)
    Thelen2003Muscle semimem_l: max_isometric_force=2576 optimal_fiber_length=0.08057534 tendon_slack_length=0.3615818
        pennation_angle_at_optimal=0.2617994
      PathPoint P1: pelvis (-0.120335 -0.0983981 -0.0648835)
      ConditionalPathPoint P2: tibia_l (-0.0371128 -0.0375287 0.0201668) range=(-0.558505 0.174533)
          coordinate=knee_angle_l
      PathPoint P3: tibia_l (-0.0287944 -0.0508808 0.0208706)
    Thelen2003Muscle semiten_l: max_isometric_force=820 optimal_fiber_length=0.2039714 tendon_slack_length=0.2592771
        pennation_angle_at_optimal=0.08726646
      PathPoint P1: pelvis (-0.127553 -0.110926 -0.0547939)
      ConditionalPathPoint P2: tibia_l (-0.0448233 -0.0304901 0.0242833) range=(-0.331613 0.174533)
          coordinate=knee_angle_l
      PathPoint P3: tibia_l (-0.0354278 -0.0563304 0.0244006)
      PathPoint P4: tibia_l (-0.012051 -0.0795579 0.0261283)
      PathPoint P5: tibia_l (0.00287944 -0.101954 0.0205827)
    Thelen2003Muscle bifemlh_l: max_isometric_force=1792 optimal_fiber_length=0.1098481 tendon_slack_length=0.3285365
        pennation_angle_at_optimal=0
      PathPoint P1: pelvis (-0.127159 -0.103547 -0.0630053)
      PathPoint P2: tibia_l (-0.0321005 -0.0383926 -0.0313859)
      PathPoint P3: tibia_l (-0.0249552 -0.0600417 -0.0365796)
    Thelen2003Muscle bifemsh_l: max_isometric_force=1608 optimal_fiber_length=0.1758341 tendon_slack_length=0.09045802
        pennation_angle_at_optimal=0.4014257
      PathPoint P1: femur_l (0.005 -0.2111 -0.0234)
      PathPoint P2: tibia_l (-0.0321005 -0.0383926 -0.0313859)
      PathPoint P3: tibia_l (-0.0249552 -0.0600417 -0.0365796)
    Thelen2003Muscle sar_l: max_isometric_force=312 optimal_fiber_length=0.5258138 tendon_slack_length=0.101118
        pennation_angle_at_optimal=0
      PathPoint P1: pelvis (-0.0154457 -0.00131238 -0.112691)
      PathPoint P2: femur_l (-0.003 -0.3568 0.0421)
      PathPoint P3: tibia_l (-0.00597218 -0.0446847 0.0425518)
      PathPoint P4: tibia_l (0.00639876 -0.0628145 0.0408454)
      PathPoint P5: tibia_l (0.025915 -0.0895827 0.0268748)
    Thelen2003Muscle add_long_l: max_isometric_force=1254 optimal_fiber_length=0.136349 tendon_slack_length=0.108684
        pennation_angle_at_optimal=0.1047198
      PathPoint P1: pelvis (-0.0319009 -0.084396 -0.015334)
      PathPoint P2: femur_l (0.005 -0.2111 -0.0234)
    Thelen2003Muscle add_brev_l: max_isometric_force=858 optimal_fiber_length=0.1285513 tendon_slack_length=0.01933103
        pennation_angle_at_optimal=0
      PathPoint P1: pelvis (-0.0592589 -0.0923713 -0.0148803)
      PathPoint P2: femur_l (0.0009 -0.1196 -0.0294)
    Thelen2003Muscle add_mag1_l: max_isometric_force=762 optimal_fiber_length=0.08357918 tendon_slack_length=0.05764081
        pennation_angle_at_optimal=0.08726646
      PathPoint P1: pelvis (-0.073897 -0.118518 -0.023137)
      PathPoint P2: femur_l (-0.0045 -0.1211 -0.0339)
    Thelen2003Muscle add_mag2_l: max_isometric_force=686 optimal_fiber_length=0.1195341 tendon_slack_length=0.1185462
        pennation_angle_at_optimal=0.05235988
      PathPoint P1: pelvis (-0.0838913 -0.120335 -0.0279459)
      PathPoint P2: femur_l (0.0054 -0.2285 -0.0227)
    Thelen2003Muscle add_mag3_l: max_isometric_force=976 optimal_fiber_length=0.1308222 tendon_slack_length=0.2486621
        pennation_angle_at_optimal=0.08726646
      PathPoint P1: pelvis (-0.112138 -0.115217 -0.0442961)
      PathPoint P2: femur_l (0.007 -0.3837 0.0266)
    Thelen2003Muscle tfl_l: max_isometric_force=466 optimal_fiber_length=0.09575665 tendon_slack_length=0.428385
        pennation_angle_at_optimal=0.05235988
      PathPoint P1: pelvis (-0.0313961 0.0216038 -0.1126)
      PathPoint P2: femur_l (0.0294 -0.0995 -0.0597)
      PathPoint P3: femur_l (0.0054 -0.4049 -0.0357)
      PathPoint P4: tibia_l (0.00639876 -0.0519366 -0.0316739)
    Thelen2003Muscle pect_l: max_isometric_force=532 optimal_fiber_length=0.09796021 tendon_slack_length=0.03232687
        pennation_angle_at_optimal=0
      PathPoint P1: pelvis (-0.0435104 -0.0775313 -0.0409208)
      PathPoint P2: femur_l (-0.0122 -0.0822 -0.0253)
    Thelen2003Muscle grac_l: max_isometric_force=324 optimal_fiber_length=0.3565618 tendon_slack_length=0.1276329
        pennation_angle_at_optimal=0.05235988
      PathPoint P1: pelvis (-0.0747147 -0.11983 -0.0253509)
      ConditionalPathPoint P2: tibia_l (-0.0283358 -0.0340201 0.0402482) range=(-0.436332 0.174533)
          coordinate=knee_angle_l
      PathPoint P3: tibia_l (-0.0207213 -0.0549547 0.0381793)
      PathPoint P4: tibia_l (0.00639876 -0.0891561 0.0243153)
    Thelen2003Muscle glut_max1_l: max_isometric_force=1146 optimal_fiber_length=0.1426435 tendon_slack_length=0.1255665
        pennation_angle_at_optimal=0.08726646
      PathPoint P1: pelvis (-0.120638 0.0617828 -0.0635134)
      PathPoint P2: pelvis (-0.130329 0.00121143 -0.0803898)
      PathPoint P3: femur_l (-0.0457 -0.0248 -0.0392)
      PathPoint P4: femur_l (-0.0277 -0.0566 -0.047)
    Thelen2003Muscle glut_max2_l: max_isometric_force=1638 optimal_fiber_length=0.1468165 tendon_slack_length=0.1268415
        pennation_angle_at_optimal=0
      PathPoint P1: pelvis (-0.136185 0.0177676 -0.0510829)
      PathPoint P2: pelvis (-0.13891 -0.0524951 -0.0829304)
      PathPoint P3: femur_l (-0.0426 -0.053 -0.0293)
      PathPoint P4: femur_l (-0.0156 -0.1016 -0.0419)
    Thelen2003Muscle glut_max3_l: max_isometric_force=1104 optimal_fiber_length=0.1423608 tendon_slack_length=0.1433495
        pennation_angle_at_optimal=0.08726646
      PathPoint P1: pelvis (-0.157082 -0.031699 -0.00526254)
      PathPoint P2: pelvis (-0.154356 -0.106202 -0.0365656)
      PathPoint P3: femur_l (-0.0299 -0.1041 -0.0135)
      PathPoint P4: femur_l (-0.006 -0.1419 -0.0411)
    Thelen2003Muscle iliacus_l: max_isometric_force=2146 optimal_fiber_length=0.1006508 tendon_slack_length=0.1006508
        pennation_angle_at_optimal=0.1221731
      PathPoint P1: pelvis (-0.0680418 0.0368476 -0.0774864)
      PathPoint P2: pelvis (-0.0260457 -0.0555237 -0.0735848)
      ConditionalPathPoint P3: pelvis (-0.0290742 -0.0812665 -0.0740385) range=(-1.5708 0.785398)
          coordinate=hip_flexion_l
      PathPoint P4: femur_l (0.0017 -0.0543 -0.0057)
      PathPoint P5: femur_l (-0.0193 -0.0621 -0.0129)
    Thelen2003Muscle psoas_l: max_isometric_force=2226 optimal_fiber_length=0.1001704 tendon_slack_length=0.1602726
        pennation_angle_at_optimal=0.1396263
      PathPoint P1: pelvis (-0.0653161 0.0895446 -0.026222)
      PathPoint P2: pelvis (-0.0240266 -0.0575428 -0.0688667)
      ConditionalPathPoint P3: pelvis (-0.0290742 -0.0812665 -0.0740385) range=(-1.5708 0.785398)
          coordinate=hip_flexion_l
      PathPoint P4: femur_l (0.0016 -0.0507 -0.0038)
      PathPoint P5: femur_l (-0.0188 -0.0597 -0.0104)
    Thelen2003Muscle quad_fem_l: max_isometric_force=762 optimal_fiber_length=0.05188388 tendon_slack_length=0.0230595
        pennation_angle_at_optimal=0
      PathPoint P1: pelvis (-0.115388 -0.116196 -0.0471814)
      PathPoint P2: femur_l (-0.0381 -0.0359 -0.0366)
    Thelen2003Muscle gem_l: max_isometric_force=328 optimal_fiber_length=0.02371416 tendon_slack_length=0.03853551
        pennation_angle_at_optimal=0
      PathPoint P1: pelvis (-0.114379 -0.0827808 -0.0647837)
      PathPoint P2: femur_l (-0.0142 -0.0033 -0.0443)
    Thelen2003Muscle peri_l: max_isometric_force=888 optimal_fiber_length=0.02531487 tendon_slack_length=0.1119696
        pennation_angle_at_optimal=0.1745329
      PathPoint P1: pelvis (-0.140929 0.000302857 -0.0213224)
      PathPoint P2: pelvis (-0.120436 -0.0278628 -0.0596119)
      PathPoint P3: femur_l (-0.0148 -0.0036 -0.0437)
    Thelen2003Muscle rect_fem_l: max_isometric_force=2338 optimal_fiber_length=0.113775 tendon_slack_length=0.3093881
        pennation_angle_at_optimal=0.08726646
      PathPoint P1: pelvis (-0.0297809 -0.0313961 -0.08783)
      ConditionalPathPoint P2: femur_l (0.0334 -0.403 -0.0019) range=(-2.61799 -1.45997) coordinate=knee_angle_l
      MovingPathPoint P3: tibia_l (0.0583525 0.0240501 -0.00149304) x_coordinate=knee_angle_l y_coordinate=knee_angle_l
          z_coordinate=knee_angle_l
        x_location: MultiplierFunction: scale=1.06646
          SimmSpline: x=(-2.0944 -1.99997 -1.5708 -1.45752 -1.39626 -1.0472 -0.698132 -0.526391 -0.349066 -0.174533 0 0.00017453 0.00034907 0.0279253 0.0872665 0.174533 2.0944)
              y=(0.0155805 0.0179938 0.0275081 0.0296564 0.0307615 0.0365695 0.0422074 0.0450902 0.048391 0.0534299 0.0617576 0.0617669 0.0617762 0.0633083 0.066994 0.0733035 0.0573481)
        y_location: MultiplierFunction: scale=1.06646
          SimmSpline: x=(-2.0944 -1.99997 -1.5708 -1.45752 -1.39626 -1.0472 -0.698132 -0.526391 -0.349066 -0.174533 0 0.00017453 0.00034907 0.0279253 0.0872665 0.174533 2.0944)
              y=(0.0234116 0.0237613 0.0251141 0.0252795 0.0253146 0.0249184 0.0242373 0.0238447 0.0234197 0.0227644 0.020984 0.0209814 0.0209788 0.0205225 0.0191754 0.0159554 -0.0673774)
        z_location: MultiplierFunction: scale=1.06646
          SimmSpline: x=(-2.0944 0.1745) y=(-0.0014 -0.0014)
    Thelen2003Muscle vas_med_l: max_isometric_force=2588 optimal_fiber_length=0.08882955 tendon_slack_length=0.1257587
        pennation_angle_at_optimal=0.08726646
      PathPoint P1: femur_l (0.014 -0.2099 -0.0188)
      PathPoint P2: femur_l (0.0356 -0.2769 -0.0009)
      ConditionalPathPoint P3: femur_l (0.037 -0.4048 0.0125) range=(-2.61799 -1.21004) coordinate=knee_angle_l
      ConditionalPathPoint P4: femur_l (0.0274 -0.4255 0.0131) range=(-2.61799 -1.78006) coordinate=knee_angle_l
      MovingPathPoint P5: tibia_l (0.0521063 0.0240521 0.0155703) x_coordinate=knee_angle_l y_coordinate=knee_angle_l
          z_coordinate=knee_angle_l
        x_location: MultiplierFunction: scale=1.06646
          SimmSpline: x=(-2.0944 -1.99997 -1.5708 -1.45752 -1.39626 -1.0472 -0.698132 -0.526391 -0.349066 -0.174533 0 0.00017453 0.00034907 0.0279253 0.0872665 0.174533 2.0944)
              y=(0.00981097 0.0122243 0.0217371 0.0238851 0.0249902 0.0307959 0.0364187 0.0392871 0.0425654 0.0475764 0.0559586 0.0559681 0.0559776 0.0575419 0.0613368 0.0679503 0.0629332)
        y_location: MultiplierFunction: scale=1.06646
          SimmSpline: x=(-2.0944 -1.99997 -1.5708 -1.45752 -1.39626 -1.0472 -0.698132 -0.526391 -0.349066 -0.174533 0 0.00017453 0.00034907 0.0279253 0.0872665 0.174533 2.0944)
              y=(0.0224154 0.0227651 0.0241265 0.0242933 0.0243287 0.0239462 0.0233593 0.0230677 0.0228342 0.0226362 0.0217917 0.0217903 0.0217889 0.0215365 0.0206842 0.0183269 -0.0656205)
        z_location: MultiplierFunction: scale=1.06646
          SimmSpline: x=(-2.0944 2.0944) y=(0.0146 0.0146)
    Thelen2003Muscle vas_int_l: max_isometric_force=2730 optimal_fiber_length=0.08672578 tendon_slack_length=0.1355713
        pennation_angle_at_optimal=0.05235988
      PathPoint P1: femur_l (0.029 -0.1924 -0.031)
      PathPoint P2: femur_l (0.0335 -0.2084 -0.0285)
      ConditionalPathPoint P3: femur_l (0.0343 -0.403 -0.0055) range=(-2.61799 -1.42) coordinate=knee_angle_l
      MovingPathPoint P4: tibia_l (0.0583525 0.0240501 -0.00149304) x_coordinate=knee_angle_l y_coordinate=knee_angle_l
          z_coordinate=knee_angle_l
        x_location: MultiplierFunction: scale=1.06646
          SimmSpline: x=(-2.0944 -1.99997 -1.5708 -1.45752 -1.39626 -1.0472 -0.698132 -0.526391 -0.349066 -0.174533 0 0.00017453 0.00034907 0.0279253 0.0872665 0.174533 2.0944)
              y=(0.0155805 0.0179938 0.0275081 0.0296564 0.0307615 0.0365695 0.0422074 0.0450902 0.048391 0.0534299 0.0617576 0.0617669 0.0617762 0.0633083 0.066994 0.0733035 0.0573481)
        y_location: MultiplierFunction: scale=1.06646
          SimmSpline: x=(-2.0944 -1.99997 -1.5708 -1.45752 -1.39626 -1.0472 -0.698132 -0.526391 -0.349066 -0.174533 0 0.00017453 0.00034907 0.0279253 0.0872665 0.174533 2.0944)
              y=(0.0234116 0.0237613 0.0251141 0.0252795 0.0253146 0.0249184 0.0242373 0.0238447 0.0234197 0.0227644 0.020984 0.0209814 0.0209788 0.0205225 0.0191754 0.0159554 -0.0673774)
        z_location: MultiplierFunction: scale=1.06646
          SimmSpline: x=(-2.0944 0.1745) y=(-0.0014 -0.0014)
    Thelen2003Muscle vas_lat_l: max_isometric_force=3742 optimal_fiber_length=0.08384238 tendon_slack_length=0.1567054
        pennation_angle_at_optimal=0.08726646
      PathPoint P1: femur_l (0.0048 -0.1854 -0.0349)
      PathPoint P2: femur_l (0.0269 -0.2591 -0.0409)
      ConditionalPathPoint P3: femur_l (0.0361 -0.403 -0.0205) range=(-2.61799 -1.21004) coordinate=knee_angle_l
      ConditionalPathPoint P4: femur_l (0.0253 -0.4243 -0.0184) range=(-2.61799 -1.92004) coordinate=knee_angle_l
      MovingPathPoint P5: tibia_l (0.0566565 0.0223075 -0.0175966) x_coordinate=knee_angle_l y_coordinate=knee_angle_l
          z_coordinate=knee_angle_l
        x_location: MultiplierFunction: scale=1.06646
          SimmSpline: x=(-2.0944 -1.99997 -1.5708 -1.45752 -1.39626 -1.0472 -0.698132 -0.526391 -0.349066 -0.174533 0 0.00017453 0.00034907 0.0279253 0.0872665 0.174533 2.0944)
              y=(0.0142897 0.016703 0.0262145 0.0283623 0.0294674 0.0352709 0.0408785 0.0437291 0.0469704 0.0518742 0.0599557 0.0599647 0.0599738 0.0614577 0.0650351 0.0711867 0.0583766)
        y_location: MultiplierFunction: scale=1.06646
          SimmSpline: x=(-2.0944 -1.99997 -1.5708 -1.45752 -1.39626 -1.0472 -0.698132 -0.526391 -0.349066 -0.174533 0 0.00017453 0.00034907 0.0279253 0.0872665 0.174533 2.0944)
              y=(0.0215318 0.0218815 0.0232362 0.0234019 0.0234371 0.0230439 0.0223842 0.0220151 0.0216359 0.0210971 0.0195864 0.0195842 0.019582 0.01919 0.018008 0.0151073 -0.0653421)
        z_location: MultiplierFunction: scale=1.06646
          SimmSpline: x=(-2.0944 2.0944) y=(-0.0165 -0.0165)
    Thelen2003Muscle med_gas_l: max_isometric_force=3116 optimal_fiber_length=0.06390371 tendon_slack_length=0.4153741
        pennation_angle_at_optimal=0.296706
      PathPoint P1: femur_l (-0.019 -0.3929 0.0235)
      ConditionalPathPoint P2: femur_l (-0.03 -0.4022 0.0258) range=(-0.785398 0.174533) coordinate=knee_angle_l
      PathPoint P3: calcn_l (0 0.033676 0.00575751)
    Thelen2003Muscle lat_gas_l: max_isometric_force=1366 optimal_fiber_length=0.06823131 tendon_slack_length=0.4051234
        pennation_angle_at_optimal=0.1396263
      PathPoint P1: femur_l (-0.022 -0.3946 -0.0272)
      ConditionalPathPoint P2: femur_l (-0.03 -0.4018 -0.0274) range=(-0.785398 0.174533) coordinate=knee_angle_l
      PathPoint P3: calcn_l (0 0.033676 0.00575751)
    Thelen2003Muscle soleus_l: max_isometric_force=7098 optimal_fiber_length=0.0533864 tendon_slack_length=0.266932
        pennation_angle_at_optimal=0.4363323
      PathPoint P1: tibia_l (-0.0025595 -0.163488 -0.00757187)
      PathPoint P2: calcn_l (0 0.033676 0.00575751)
    Thelen2003Muscle tib_post_l: max_isometric_force=3176 optimal_fiber_length=0.03314087 tendon_slack_length=0.3314087
        pennation_angle_at_optimal=0.2094395
      PathPoint P1: tibia_l (-0.0100247 -0.143759 -0.00202627)
      PathPoint P2: tibia_l (-0.015357 -0.432023 0.0244219)
      PathPoint P3: calcn_l (0.0452997 0.0362832 0.0310688)
      PathPoint P4: calcn_l (0.0838641 0.0172725 0.0305257)
    Thelen2003Muscle flex_dig_l: max_isometric_force=620 optimal_fiber_length=0.03657768 tendon_slack_length=0.4303256
        pennation_angle_at_optimal=0.1221731
      PathPoint P1: tibia_l (-0.00885162 -0.218198 0.00191963)
      PathPoint P2: tibia_l (-0.0164235 -0.432023 0.0209026)
      PathPoint P3: calcn_l (0.0473637 0.0342192 0.030417)
      PathPoint P4: calcn_l (0.0769117 0.0191193 0.0285703)
      PathPoint P5: calcn_l (0.180112 -0.00879922 -0.0126013)
      PathPoint P6: toes_l (-0.00206401 -0.00847332 -0.0159689)
      PathPoint P7: toes_l (0.0309602 -0.00771289 -0.0233559)
      PathPoint P8: toes_l (0.0479068 -0.00651794 -0.026289)
    Thelen2003Muscle flex_hal_l: max_isometric_force=644 optimal_fiber_length=0.0462941 tendon_slack_length=0.4091107
        pennation_angle_at_optimal=0.1745329
      PathPoint P1: tibia_l (-0.00842504 -0.248912 -0.0260216)
      PathPoint P2: tibia_l (-0.0198362 -0.435009 0.0185564)
      PathPoint P3: calcn_l (0.0406285 0.0299825 0.0261804)
      PathPoint P4: calcn_l (0.11276 0.007387 0.0278099)
      PathPoint P5: calcn_l (0.187499 -0.00575751 0.0292221)
      PathPoint P6: toes_l (0.016838 -0.00695247 0.0287876)
      PathPoint P7: toes_l (0.0610513 -0.0110805 0.0196624)
    Thelen2003Muscle tib_ant_l: max_isometric_force=1810 optimal_fiber_length=0.1048791 tendon_slack_length=0.2386534
        pennation_angle_at_optimal=0.08726646
      PathPoint P1: tibia_l (0.0190896 -0.173193 -0.0122643)
      PathPoint P2: tibia_l (0.0350865 -0.421358 0.0188763)
      PathPoint P3: calcn_l (0.126665 0.0193365 0.0331328)
    Thelen2003Muscle per_brev_l: max_isometric_force=870 optimal_fiber_length=0.05350374 tendon_slack_length=0.172282
        pennation_angle_at_optimal=0.08726646
      PathPoint P1: tibia_l (-0.00746522 -0.282185 -0.03466)
      PathPoint P2: tibia_l (-0.0211159 -0.446207 -0.0301808)
      PathPoint P3: tibia_l (-0.015357 -0.458045 -0.0308207)
      PathPoint P4: calcn_l (0.0511658 0.0293307 -0.0253113)
      PathPoint P5: calcn_l (0.0735441 0.0237905 -0.0372609)
    Thelen2003Muscle per_long_l: max_isometric_force=1886 optimal_fiber_length=0.05253599 tendon_slack_length=0.3698963
        pennation_angle_at_optimal=0.1745329
      PathPoint P1: tibia_l (0.00053323 -0.167221 -0.0386059)
      PathPoint P2: tibia_l (-0.0220757 -0.448447 -0.0305008)
      PathPoint P3: tibia_l (-0.0172767 -0.460604 -0.0308207)
      PathPoint P4: calcn_l (0.0475809 0.0249854 -0.0240077)
      PathPoint P5: calcn_l (0.0739786 0.011515 -0.0308516)
      PathPoint P6: calcn_l (0.0925547 0.00749563 -0.0128186)
      PathPoint P7: calcn_l (0.130685 0.00923374 0.0199883)
    Thelen2003Muscle per_tert_l: max_isometric_force=360 optimal_fiber_length=0.08463504 tendon_slack_length=0.107133
        pennation_angle_at_optimal=0.2268928
      PathPoint P1: tibia_l (0.00106646 -0.299035 -0.0246352)
      PathPoint P2: tibia_l (0.0244219 -0.433943 -0.0169567)
      PathPoint P3: calcn_l (0.0930979 0.0247682 -0.0324811)
    Thelen2003Muscle ext_dig_l: max_isometric_force=1024 optimal_fiber_length=0.1095249 tendon_slack_length=0.3704519
        pennation_angle_at_optimal=0.1396263
      PathPoint P1: tibia_l (0.00341267 -0.147278 -0.0294343)
      PathPoint P2: tibia_l (0.0308207 -0.427331 -0.00767851)
      PathPoint P3: calcn_l (0.100159 0.0421493 0.000108632)
      PathPoint P4: calcn_l (0.17555 0.00597478 -0.0141222)
      PathPoint P5: toes_l (0.000325897 0.00510572 -0.0166207)
      PathPoint P6: toes_l (0.0481241 -0.000434529 -0.0271581)
    Thelen2003Muscle ext_hal_l: max_isometric_force=324 optimal_fiber_length=0.1192918 tendon_slack_length=0.3277837
        pennation_angle_at_optimal=0.1047198
      PathPoint P1: tibia_l (0.00127975 -0.188444 -0.0243153)
      PathPoint P2: tibia_l (0.0347666 -0.424984 0.00906491)
      PathPoint P3: calcn_l (0.105373 0.042258 0.0229214)
      PathPoint P4: calcn_l (0.140462 0.0335674 0.0279185)
      PathPoint P5: calcn_l (0.188368 0.0150999 0.030417)
      PathPoint P6: toes_l (0.0323724 0.00445392 0.0266149)
      PathPoint P7: toes_l (0.06116 0.0036935 0.0202056)
    Thelen2003Muscle ercspn_r: max_isometric_force=5000 optimal_fiber_length=0.1335086 tendon_slack_length=0.03337716
        pennation_angle_at_optimal=0
      PathPoint P1: pelvis (-0.141333 0.044318 0.0395598)
      PathPoint P2: torso (-0.06325 0.1265 0.027715)
    Thelen2003Muscle ercspn_l: max_isometric_force=5000 optimal_fiber_length=0.1335086 tendon_slack_length=0.03337716
        pennation_angle_at_optimal=0
      PathPoint P1: pelvis (-0.141333 0.044318 -0.0395598)
      PathPoint P2: torso (-0.06325 0.1265 -0.027715)
    Thelen2003Muscle intobl_r: max_isometric_force=1800 optimal_fiber_length=0.1081093 tendon_slack_length=0.1081093
        pennation_angle_at_optimal=0
      PathPoint P1: pelvis (-0.0403809 0.0706665 0.104979)
      PathPoint P2: torso (0.0805 0.184 0.01725)
    Thelen2003Muscle intobl_l: max_isometric_force=1800 optimal_fiber_length=0.1081093 tendon_slack_length=0.1081093
        pennation_angle_at_optimal=0
      PathPoint P1: pelvis (-0.0403809 0.0706665 -0.104979)
      PathPoint P2: torso (0.0805 0.184 -0.01725)
    Thelen2003Muscle extobl_r: max_isometric_force=1800 optimal_fiber_length=0.1301262 tendon_slack_length=0.1518139
        pennation_angle_at_optimal=0
      PathPoint P1: pelvis (-0.0302857 -0.0642056 0.00907334)
      PathPoint P2: torso (0.07475 0.1265 0.1265)
    Thelen2003Muscle extobl_l: max_isometric_force=1800 optimal_fiber_length=0.1301262 tendon_slack_length=0.1518139
        pennation_angle_at_optimal=0
      PathPoint P1: pelvis (-0.0302857 -0.0642056 -0.00907334)
      PathPoint P2: torso (0.07475 0.1265 -0.1265)
    CustomLigament aACL_R: resting_length=0.0335536 damping=390.922 stiffness=1500 el=0.03
      PathPoint aACL_R_femur: femur_r (-0.00718 -0.40037 0.00407)
      PathPoint aACL_R_tibia: tibia_r (0.0106017 -0.0361306 -0.0060416)
    CustomLigament pACL_R: resting_length=0.0254109 damping=403.7425 stiffness=1600 el=0.03
      PathPoint pACL_R_femur: femur_r (-0.01495 -0.40981 0.00999)
      PathPoint pACL_R_tibia: tibia_r (0.00266615 -0.03466 0)
    CustomLigament aPCL_R: resting_length=0.03669397 damping=514.6727 stiffness=2600 el=0.03
      PathPoint aPCL_R_femur: femur_r (-0.00867 -0.41342 -0.00925)
      PathPoint aPCL_R_tibia: tibia_r (-0.0218091 -0.0353425 0.00355131)
    CustomLigament pPCL_R: resting_length=0.02630724 damping=439.9682 stiffness=1900 el=0.03
      PathPoint pPCL_R_femur: femur_r (-0.01588 -0.40574 -0.01629)
      PathPoint pPCL_R_tibia: tibia_r (-0.0156876 -0.0338601 -0.00434049)
    CustomLigament aMCL_R: resting_length=0.07568146 damping=504.6781 stiffness=2500 el=0.03
      PathPoint aMCL_R_femur: femur_r (-0.00741 -0.40435 -0.034)
      PathPoint aMCL_R_tibia: tibia_r (0.00819041 -0.0848902 -0.0294556)
    CustomLigament iMCL_R: resting_length=0.0782674 damping=552.8472 stiffness=3000 el=0.03
      PathPoint iMCL_R_femur: femur_r (-0.01274 -0.4062 -0.03351)
      PathPoint iMCL_R_tibia: tibia_r (0.00265549 -0.088047 -0.031034)
    CustomLigament pMCL_R: resting_length=0.09200892 damping=504.6781 stiffness=2500 el=0.03
      PathPoint pMCL_R_femur: femur_r (-0.01777 -0.40361 -0.03351)
      PathPoint pMCL_R_tibia: tibia_r (0.00265549 -0.100279 -0.0281545)
    CustomLigament dMCL_R: resting_length=0.04251704 damping=451.3978 stiffness=2000 el=0.03
      PathPoint dMCL_R_femur: femur_r (-0.00741 -0.40435 -0.034)
      PathPoint dMCL_R_tibia: tibia_r (0.00502303 -0.0469242 -0.0373261)
    CustomLigament eMCL_R: resting_length=0.03869104 damping=677.0967 stiffness=4500 el=0.03
      PathPoint eMCL_R_femur: femur_r (-0.01777 -0.40361 -0.03351)
      PathPoint eMCL_R_tibia: tibia_r (-0.0053323 -0.0469242 -0.0373261)
    CustomLigament aLCL_R: resting_length=0.05843603 damping=451.3978 stiffness=2000 el=0.03
      PathPoint aLCL_R_femur: femur_r (-0.00978 -0.40056 0.0345)
      PathPoint aLCL_R_tibia: tibia_r (-0.00757187 -0.0645848 0.0397256)
    CustomLigament aACL_L: resting_length=0.03353562 damping=390.922 stiffness=1500 el=0.03
      PathPoint aACL_L_femur: femur_l (-0.00718 -0.40037 -0.00407)
      PathPoint aACL_L_tibia: tibia_l (0.0176712 -0.0320898 0.000789181)
    CustomLigament pACL_L: resting_length=0.0254931 damping=403.7425 stiffness=1600 el=0.03
      PathPoint pACL_L_femur: femur_l (-0.01495 -0.40981 -0.00999)
      PathPoint pACL_L_tibia: tibia_l (0.00266615 -0.03466 0)
    CustomLigament aPCL_L: resting_length=0.03645435 damping=514.6727 stiffness=2600 el=0.03
      PathPoint aPCL_L_femur: femur_l (-0.00867 -0.41342 0.00925)
      PathPoint aPCL_L_tibia: tibia_l (-0.0218091 -0.0353425 -0.00355131)
    CustomLigament pPCL_L: resting_length=0.02604934 damping=439.9682 stiffness=1900 el=0.03
      PathPoint pPCL_L_femur: femur_l (-0.01588 -0.40574 0.01629)
      PathPoint pPCL_L_tibia: tibia_l (-0.0156876 -0.0338601 -0.00434049)
    CustomLigament aMCL_L: resting_length=0.07538314 damping=504.6781 stiffness=2500 el=0.03
      PathPoint aMCL_L_femur: femur_l (-0.00741 -0.40435 0.034)
      PathPoint aMCL_L_tibia: tibia_l (0.00819041 -0.0848902 0.0294556)
    CustomLigament iMCL_L: resting_length=0.07796465 damping=552.8472 stiffness=3000 el=0.03
      PathPoint iMCL_L_femur: femur_l (-0.01274 -0.4062 0.03351)
      PathPoint iMCL_L_tibia: tibia_l (0.00265549 -0.088047 0.031034)
    CustomLigament pMCL_L: resting_length=0.09174864 damping=504.6781 stiffness=2500 el=0.03
      PathPoint pMCL_L_femur: femur_l (-0.01777 -0.40361 0.03351)
      PathPoint pMCL_L_tibia: tibia_l (0.00265549 -0.100279 0.0281545)
    CustomLigament dMCL_L: resting_length=0.04215915 damping=451.3978 stiffness=2000 el=0.03
      PathPoint dMCL_L_femur: femur_l (-0.00741 -0.40435 0.034)
      PathPoint dMCL_L_tibia: tibia_l (0.00502303 -0.0469242 0.0373261)
    CustomLigament eMCL_L: resting_length=0.03843155 damping=677.0967 stiffness=4500 el=0.03
      PathPoint eMCL_L_femur: femur_l (-0.01777 -0.40361 0.03351)
      PathPoint eMCL_L_tibia: tibia_l (-0.0053323 -0.0469242 0.0373261)
    CustomLigament aLCL_L: resting_length=0.05878443 damping=451.3978 stiffness=2000 el=0.03
      PathPoint aLCL_L_femur: femur_l (-0.00978 -0.40056 -0.0345)
      PathPoint aLCL_L_tibia: tibia_l (-0.00757187 -0.0645848 -0.0397256)
    SpringGeneralizedForce constact_stiffness_ant_post: coordinate=knee_anterior_posterior_r stiffness=300
        rest_length=0.02 viscosity=500
    SpringGeneralizedForce constact_stiffness_med_lat: coordinate=knee_inferior_superior_r stiffness=200
        rest_length=-0.42 viscosity=300
    ObjectGroup R_hip_abd: members=(glut_max1_r glut_med1_r glut_med2_r glut_med3_r glut_min1_r glut_min2_r glut_min3_r peri_r sar_r tfl_r)
    ObjectGroup R_hip_flex: members=(add_brev_r add_long_r glut_med1_r glut_min1_r grac_r iliacus_r pect_r psoas_r rect_fem_r sar_r tfl_r)
    ObjectGroup R_hip_inrot: members=(glut_med1_r glut_min1_r iliacus_r psoas_r tfl_r)
    ObjectGroup R_hip_exrot: members=(gem_r glut_med3_r glut_min3_r peri_r quad_fem_r)
    ObjectGroup R_hip_ext: members=(add_long_r add_mag1_r add_mag2_r add_mag3_r bifemlh_r glut_max1_r glut_max2_r glut_max3_r glut_med3_r glut_min3_r semimem_r semiten_r)
    ObjectGroup R_hip_add: members=(add_brev_r add_long_r add_mag1_r add_mag2_r add_mag3_r bifemlh_r grac_r pect_r semimem_r semiten_r)
    ObjectGroup R_knee_bend: members=(bifemlh_r bifemsh_r grac_r lat_gas_r med_gas_r sar_r semimem_r semiten_r)
    ObjectGroup R_knee_ext: members=(rect_fem_r vas_int_r vas_lat_r vas_med_r)
    ObjectGroup R_ankle_pf: members=(flex_dig_r flex_hal_r lat_gas_r med_gas_r per_brev_r per_long_r soleus_r tib_post_r)
    ObjectGroup R_inverter: members=(ext_hal_r flex_dig_r flex_hal_r tib_ant_r tib_post_r)
    ObjectGroup R_ankle_df: members=(ext_dig_r ext_hal_r per_tert_r tib_ant_r)
    ObjectGroup R_everter: members=(ext_dig_r per_brev_r per_long_r per_tert_r)
    ObjectGroup L_hip_abd: members=(glut_max1_l glut_med1_l glut_med2_l glut_med3_l glut_min1_l glut_min2_l glut_min3_l peri_l sar_l tfl_l)
    ObjectGroup L_hip_flex: members=(add_brev_l add_long_l glut_med1_l glut_min1_l grac_l iliacus_l pect_l psoas_l rect_fem_l sar_l tfl_l)
    ObjectGroup L_hip_inrot: members=(glut_med1_l glut_min1_l iliacus_l psoas_l tfl_l)
    ObjectGroup L_hip_exrot: members=(gem_l glut_med3_l glut_min3_l peri_l quad_fem_l)
    ObjectGroup L_hip_ext: members=(add_long_l add_mag1_l add_mag2_l add_mag3_l bifemlh_l glut_max1_l glut_max2_l glut_max3_l glut_med3_l glut_min3_l semimem_l semiten_l)
    ObjectGroup L_hip_add: members=(add_brev_l add_long_l add_mag1_l add_mag2_l add_mag3_l bifemlh_l grac_l pect_l semimem_l semiten_l)
    ObjectGroup L_knee_bend: members=(bifemlh_l bifemsh_l grac_l lat_gas_l med_gas_l sar_l semimem_l semiten_l)
    ObjectGroup L_knee_ext: members=(rect_fem_l vas_int_l vas_lat_l vas_med_l)
    ObjectGroup L_ankle_pf: members=(flex_dig_l flex_hal_l lat_gas_l med_gas_l per_brev_l per_long_l soleus_l tib_post_l)
    ObjectGroup L_inverter: members=(ext_hal_l flex_dig_l flex_hal_l tib_ant_l tib_post_l)
    ObjectGroup L_ankle_df: members=(ext_dig_l ext_hal_l per_tert_l tib_ant_l)
    ObjectGroup L_everter: members=(ext_dig_l per_brev_l per_long_l per_tert_l)
    ObjectGroup back_ext: members=(ercspn_l ercspn_r)
    ObjectGroup back_rlb: members=(ercspn_r extobl_r intobl_r)
    ObjectGroup back_introt: members=(ercspn_r extobl_l intobl_r)
    ObjectGroup back_llb: members=(ercspn_l extobl_l intobl_l)
    ObjectGroup back_extrot: members=(ercspn_l extobl_r intobl_l)
    ObjectGroup back_flex: members=(extobl_l extobl_r intobl_l intobl_r)
  MarkerSet:
    Marker STRN: torso (0.135922 0.280023 -0.00707194)
    Marker RSHO: torso (0.00313912 0.466014 0.168319)
    Marker LSHO: torso (-0.0180687 0.465469 -0.169868)
    Marker C7: torso (-0.0738863 0.492088 0.00840677)
    Marker T10: torso (-0.0733715 0.179785 -0.00189883)
    Marker CLAV: torso (0.0763786 0.442729 0.009833)
    Marker RELB: humerus_r (-0.00162267 -0.334955 -0.018246)
    Marker RWRB: radius_r (-0.022917 -0.286445 -0.0181195)
    Marker RWRA: radius_r (-0.00162484 -0.278883 0.0553129)
    Marker RFIN: hand_r (-0.0393715 -0.0382967 0.0129163)
    Marker LELB: humerus_l (-0.00969453 -0.336243 0.0309925)
    Marker LWRB: radius_l (-0.0257444 -0.287379 0.0173205)
    Marker LWRA: radius_l (0.000475919 -0.278597 -0.0542874)
    Marker LFIN: hand_l (-0.0334346 -0.0377823 -0.0183815)
    Marker RASI: pelvis (0.0231974 0.0697807 0.119386)
    Marker LASI: pelvis (0.015975 0.0678843 -0.11277)
    Marker SACR: pelvis (-0.175685 0.0765059 0.000767599)
    Marker RPSI: pelvis (-0.169437 0.100305 0.0601611)
    Marker LPSI: pelvis (-0.167691 0.0977058 -0.0485208)
    Marker RTHI2: femur_r (-0.0271066 -0.201407 0.0865959)
    Marker RTHI: femur_r (0.0712762 -0.184914 0.0919862)
    Marker RTHI3: femur_r (0.0349413 -0.259021 0.0869087)
    Marker RKNE: femur_r (0.0214421 -0.423349 0.0525139)
    Marker RKNEmed: femur_r (-0.0142549 -0.427771 -0.0574381)
    Marker RTIB2: tibia_r (-0.0323578 -0.220206 0.0864068)
    Marker RTIB: tibia_r (0.0321933 -0.217844 0.0682546)
    Marker RTIB3: tibia_r (-0.00207405 -0.266545 0.0765423)
    Marker RANK: tibia_r (-0.0128779 -0.4614 0.0482773)
    Marker RANKmed: tibia_r (0.00601887 -0.45503 -0.0362021)
    Marker RHEE: calcn_r (-0.00658208 0.016959 -0.00866304)
    Marker RTOE: calcn_r (0.187395 0.0264326 0.019647)
    Marker RLatFoot: calcn_r (0.112671 -0.00706466 0.0544604)
    Marker LTHI2: femur_l (0.0811605 -0.171683 -0.0849921)
    Marker LTHI: femur_l (-0.0169438 -0.190837 -0.0984082)
    Marker LTHI3: femur_l (0.0460483 -0.252933 -0.0949093)
    Marker LKNE: femur_l (0.0222639 -0.424628 -0.0743781)
    Marker LKNEmed: femur_l (-0.0116264 -0.44361 0.0300832)
    Marker LTIB2: tibia_l (0.031928 -0.215015 -0.0831923)
    Marker LTIB: tibia_l (-0.0311114 -0.20963 -0.0994742)
    Marker LTIB3: tibia_l (-0.000425497 -0.26434 -0.0865475)
    Marker LANK: tibia_l (-0.0145349 -0.469866 -0.0405809)
    Marker LANKmed: tibia_l (-0.00151956 -0.458173 0.0438522)
    Marker LHEE: calcn_l (-0.00502842 0.0161276 0.00603146)
    Marker LTOE: calcn_l (0.195066 0.0306738 -0.00362459)
    Marker LLatFoot: calcn_l (0.115877 -0.0138649 -0.0440434)
    Marker RFHD: torso (0.125708 0.70798 0.064079)
    Marker LBHD: torso (-0.0584785 0.679068 -0.0492042)
    Marker LFHD: torso (0.122248 0.710703 -0.0524329)
    Marker RBHD: torso (-0.0307271 0.67932 0.0800418)
    Marker RBAK: torso (-0.106485 0.371327 0.128401)
