# OpenSim document version 30000
ForceSet gait2392_CMC:
  PointActuator FX: body=pelvis point=(-0.0713732 0 0) direction=(1 0 0) optimal_force=100
  PointActuator FY: body=pelvis point=(-0.0713732 0 0) direction=(0 1 0) optimal_force=200
  PointActuator FZ: body=pelvis point=(-0.0713732 0 0) direction=(0 0 1) optimal_force=100
  TorqueActuator MX: bodyA=pelvis bodyB=ground axis=(1 0 0) optimal_force=80
  TorqueActuator MY: bodyA=pelvis bodyB=ground axis=(0 1 0) optimal_force=80
  TorqueActuator MZ: bodyA=pelvis bodyB=ground axis=(0 0 1) optimal_force=80
  CoordinateActuator hip_flexion_r_reserve: coordinate=hip_flexion_r optimal_force=1
  CoordinateActuator hip_adduction_r_reserve: coordinate=hip_adduction_r optimal_force=1
  CoordinateActuator hip_rotation_r_reserve: coordinate=hip_rotation_r optimal_force=1
  CoordinateActuator knee_angle_r_reserve: coordinate=knee_angle_r optimal_force=1
  CoordinateActuator knee_adduction_r_reserve: coordinate=knee_adduction_r optimal_force=1
  CoordinateActuator knee_rotation_r_reserve: coordinate=knee_rotation_r optimal_force=1
  CoordinateActuator knee_anterior_posterior_r_reserve: coordinate=knee_anterior_posterior_r optimal_force=1
  CoordinateActuator knee_inferior_superior_r_reserve: coordinate=knee_inferior_superior_r optimal_force=1
  CoordinateActuator knee_medial_lateral_r_reserve: coordinate=knee_medial_lateral_r optimal_force=1
  CoordinateActuator ankle_angle_r_reserve: coordinate=ankle_angle_r optimal_force=1
  CoordinateActuator hip_flexion_l_reserve: coordinate=hip_flexion_l optimal_force=1
  CoordinateActuator hip_adduction_l_reserve: coordinate=hip_adduction_l optimal_force=1
  CoordinateActuator hip_rotation_l_reserve: coordinate=hip_rotation_l optimal_force=1
  CoordinateActuator knee_angle_l_reserve: coordinate=knee_angle_l optimal_force=1
  CoordinateActuator knee_adduction_l_reserve: coordinate=knee_adduction_l optimal_force=1
  CoordinateActuator knee_rotation_l_reserve: coordinate=knee_rotation_l optimal_force=1
  CoordinateActuator knee_anterior_posterior_l_reserve: coordinate=knee_anterior_posterior_l optimal_force=1
  CoordinateActuator knee_inferior_superior_l_reserve: coordinate=knee_inferior_superior_l optimal_force=1
  CoordinateActuator knee_medial_lateral_l_reserve: coordinate=knee_medial_lateral_l optimal_force=1
  CoordinateActuator ankle_angle_l_reserve: coordinate=ankle_angle_l optimal_force=1
  CoordinateActuator lumbar_extension_reserve: coordinate=lumbar_extension optimal_force=1
  CoordinateActuator lumbar_bending_reserve: coordinate=lumbar_bending optimal_force=1
  CoordinateActuator lumbar_rotation_reserve: coordinate=lumbar_rotation optimal_force=1
  CoordinateActuator arm_flex_r: coordinate=arm_flex_r optimal_force=200
  CoordinateActuator arm_add_r: coordinate=arm_add_r optimal_force=200
  CoordinateActuator arm_rot_r: coordinate=arm_rot_r optimal_force=200
  CoordinateActuator elbow_flex_r: coordinate=elbow_flex_r optimal_force=200
  CoordinateActuator pro_sup_r: coordinate=pro_sup_r optimal_force=200
  CoordinateActuator arm_flex_l: coordinate=arm_flex_l optimal_force=200
  CoordinateActuator arm_add_l: coordinate=arm_add_l optimal_force=200
  CoordinateActuator arm_rot_l: coordinate=arm_rot_l optimal_force=200
  CoordinateActuator elbow_flex_l: coordinate=elbow_flex_l optimal_force=200
  CoordinateActuator pro_sup_l: coordinate=pro_sup_l optimal_force=200
