# OpenSim document version 20302
AnalyzeTool Ahelaos_2CL_HDR_3:
  model_file: C:\Users\user\Documents\GitHub\ACLforces\Data\Ahelaos\Ahelaos_2CL.osim
  replace_force_set: false
  force_set_files: C:\Users\user\Documents\GitHub\ACLforces\Data\Ahelaos/Settings/Actuators.xml
  results_directory: C:\Users\user\Documents\GitHub\ACLforces\Data\Ahelaos/Results/
  output_precision: 8
  initial_time: 1.58
  final_time: 1.72
  solve_for_equilibrium_for_auxiliary_states: false
  maximum_number_of_integrator_steps: 20000
  maximum_integrator_step_size: 1
  minimum_integrator_step_size: 0.00000001
  integrator_error_tolerance: 0.00001
  external_loads_file: C:\Users\user\Documents\GitHub\ACLforces\Data\Ahelaos\HDR_3_ExternalLoads.xml
  coordinates_file: C:\Users\user\Documents\GitHub\ACLforces\Data\Ahelaos/Results/HDR_3_IK.mot
  lowpass_cutoff_frequency_for_coordinates: 6
  AnalysisSet Analyses:
    StaticOptimization: start_time=1.58 end_time=1.72 step_interval=1 in_degrees=true use_model_force_set=true
        activation_exponent=2 use_muscle_physiology=true
