# OpenSim document version 30000
InverseKinematicsTool HDR_1:
  results_directory: C:\Users\user\Documents\GitHub\ACLforces\Data\Ahelaos/Results/
  model_file: C:\Users\user\Documents\GitHub\ACLforces\Data\Ahelaos\Ahelaos_2CL.osim
  constraint_weight: Inf
  accuracy: 1e-5
  marker_file: C:\Users\user\Documents\GitHub\ACLforces\Data\Ahelaos\HDR_1.trc
  time_range: 0 3.57
  report_errors: true
  output_motion_file: C:\Users\user\Documents\GitHub\ACLforces\Data\Ahelaos/Results/HDR_1_ik.mot
  report_marker_locations: false
  IKTaskSet:
    IKMarkerTask LFHD: apply=true weight=1
    IKMarkerTask RFHD: apply=true weight=1
    IKMarkerTask LBHD: apply=true weight=1
    IKMarkerTask RBHD: apply=true weight=1
    IKMarkerTask C7: apply=true weight=1
    IKMarkerTask T10: apply=true weight=1
    IKMarkerTask CLAV: apply=true weight=1
    IKMarkerTask STRN: apply=true weight=1
    IKMarkerTask RBAK: apply=true weight=1
    IKMarkerTask LSHO: apply=true weight=1
    IKMarkerTask LELB: apply=true weight=1
    IKMarkerTask LWRA: apply=true weight=1
    IKMarkerTask LWRB: apply=true weight=1
    IKMarkerTask LFIN: apply=true weight=1
    IKMarkerTask RSHO: apply=true weight=1
    IKMarkerTask RELB: apply=true weight=1
    IKMarkerTask RWRA: apply=true weight=1
    IKMarkerTask RWRB: apply=true weight=1
    IKMarkerTask RFIN: apply=true weight=1
    IKMarkerTask LASI: apply=true weight=1
    IKMarkerTask RASI: apply=true weight=1
    IKMarkerTask SACR: apply=true weight=1
    IKMarkerTask RPSI: apply=true weight=1
    IKMarkerTask LPSI: apply=true weight=1
    IKMarkerTask LTHI: apply=true weight=1
    IKMarkerTask LTHI2: apply=true weight=1
    IKMarkerTask LTHI3: apply=true weight=1
    IKMarkerTask LKNE: apply=true weight=1
    IKMarkerTask LTIB: apply=true weight=1
    IKMarkerTask LTIB2: apply=true weight=1
    IKMarkerTask LTIB3: apply=true weight=1
    IKMarkerTask LANK: apply=true weight=1
    IKMarkerTask LHEE: apply=true weight=1
    IKMarkerTask LTOE: apply=true weight=1
    IKMarkerTask LLatFoot: apply=true weight=1
    IKMarkerTask RTHI: apply=true weight=1
    IKMarkerTask RTHI2: apply=true weight=1
    IKMarkerTask RTHI3: apply=true weight=1
    IKMarkerTask RKNE: apply=true weight=1
    IKMarkerTask RTIB: apply=true weight=1
    IKMarkerTask RTIB2: apply=true weight=1
    IKMarkerTask RTIB3: apply=true weight=1
    IKMarkerTask RANK: apply=true weight=1
    IKMarkerTask RHEE: apply=true weight=1
    IKMarkerTask RTOE: apply=true weight=1
    IKMarkerTask RLatFoot: apply=true weight=1
